# OpenSim document version 40000
Model RT-model:
  gravity: 0 -9.80665 0
  length_units: meters
  force_units: N
  credits:
    Delp S.L., Loan J.P., Hoy M.G., Zajac F.E., Topp E.L., Rosen J.M., Thelen D.G., Anderson F.C., Seth A., Hamner S.R., Arnold E., Raabe M.E., Beaucage-Gauvreau E., Brandon, S.C.E., Robertson, W.S.P, Freeman, B.J.C., Graham, R.B., Thewlis, D., Jones, C.F.
  publications:
    Notes: Raabe FBLS model adapted and validated for lifting tasks: https://doi.org/10.1080/10255842.2018.1564819. Validation of an OpenSim full-body model with detailed lumbar spine for estimating lower lumbar spine loads during symmetric and asymmetric lifting tasks.//Raabe Full Body model combines Hamner Full Body Model 2010, Christophy 2012 Lumbar DOF torso, and Arnold patella; 3D, 23 DOF gait model created by D.G. Thelen, Univ. of Wisconsin-Madison, and Samuel Hamner, Ajay Seth, Frank C. Anderson, and Scott L. Delp, Stanford University. Lower extremity joint defintions based on Delp et al. (1990). Low back joint and anthropometry based on Anderson and Pandy (1999, 2001). Planar knee model of Yamaguchi and Zajac (1989). Hamner added arms adapted from Holzbaur et al., 2005. Hamner, S.R., Seth, A, Delp, S.L.: Muscle contributions to propulsion and support during running. Journal of Biomechanics, 2010. Delp, S.L., Loan, J.P., Hoy, M.G., Zajac, F.E., Topp E.L., Rosen, J.M.: An interactive graphics-based model of the lower extremity to study orthopaedic surgical procedures, IEEE Transactions on Biomedical Engineering, vol. 37, pp. 757-767, 1990. Yamaguchi G.T., Zajac F.E.: A planar model of the knee joint to characterize the knee extensor mechanism." J . Biomech. vol. 21. pp. 1-10. 1989. Anderson F.C., Pandy M.G.: A dynamic optimization solution for vertical jumping in three dimensions. Computer Methods in Biomechanics and Biomedical Engineering 2:201-231, 1999. Anderson F.C., Pandy M.G.: Dynamic optimization of human walking. Journal of Biomechanical Engineering 123:381-390, 2001. Holzbaur, KR, WM Murray and SL Delp, 2005. A model of the upper extremity for simulating musculoskeletal surgery and analyzing neuromuscular control. Ann Biomed Eng 33(6): 829-840.
  Ground
  BodySet:
    Body pelvis: mass=25.58816 [kg] mass_center=(-0.08126487 0 0) inertia=(0.2950968 0.2500285 0.1662072 0 0 0)
        meshes=(r_pelvis.vtp l_pelvis.vtp)
    Body sacrum: mass=0 mass_center=(0 0 0) inertia=(0 0 0 0 0 0) meshes=sacrum.vtp
    Body lumbar5: mass=2.789623 mass_center=(0.01726744 0.01767831 0) inertia=(0.2549769 0.03108579 0.2453481 0 0 0)
        meshes=lumbar5.vtp
    Body lumbar4: mass=2.751388 mass_center=(0.01858648 0.02105487 0) inertia=(0.2449504 0.02958611 0.2363232 0 0 0)
        meshes=lumbar4.vtp
    Body lumbar3: mass=2.554095 mass_center=(0.0178809 0.02248323 0) inertia=(0.22562 0.0284866 0.2181087 0 0 0)
        meshes=lumbar3.vtp
    Body lumbar2: mass=2.583154 mass_center=(0.02522785 0.01952574 0) inertia=(0.232785 0.03144017 0.2256314 0 0 0)
        meshes=lumbar2.vtp
    Body lumbar1: mass=2.564801 mass_center=(0.03271621 0.01874799 0.001471595)
        inertia=(0.2327163 0.03452495 0.225949 0 0 0) meshes=lumbar1.vtp
    Body torso: mass=27.7855 mass_center=(-0.0299782 0.3091289 0) inertia=(1.705974 0.7344534 1.664211 0 0 0)
        meshes=(cerv1sm.vtp cerv2sm.vtp cerv3sm.vtp cerv4sm.vtp cerv5sm.vtp cerv6sm.vtp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)
      WrapCylinder Cylinder: translation=(-0.2078489 0.03864111 0) quadrant=all radius=0.1670506 length=0.2879161
      WrapEllipsoid Chest_r: xyz_body_rotation=(0 -0.4 0.2) translation=(0 0.2028658 0.0110737) quadrant=z
          dimensions=(0.07608484 0.1645712 0.1419166)
      WrapEllipsoid Chest_l: xyz_body_rotation=(0 0.4 0.2) translation=(0 0.2028658 -0.0110737) quadrant=-z
          dimensions=(0.07608484 0.1645712 0.1419166)
    Body Abdomen: mass=0.001529398 mass_center=(0.007994187 0 0) inertia=(2.546678e-6 8.298165e-7 1.945777e-6 0 0 0)
      WrapEllipsoid Abdomen: translation=(0 0 0) quadrant=x dimensions=(0.009992733 0.07728222 0.05536849)
    Body humerus_r: mass=3.865641 mass_center=(0 -0.1808771 0) inertia=(0.0274687 0.009475849 0.03083273 0 0 0)
        meshes=humerus_rv.vtp
    Body ulna_r: mass=1.52607 mass_center=(0 -0.1454014 0) inertia=(0.01082919 0.002259432 0.01174685 0 0 0)
        meshes=ulna_rv.vtp
    Body radius_r: mass=1.52607 mass_center=(0 -0.1454014 0) inertia=(0.01082919 0.002259432 0.01174685 0 0 0)
        meshes=radius_rv.vtp
    Body hand_r: mass=0.4402475 mass_center=(0 -0.05966218 0) inertia=(0.0006589287 0.000404074 0.0009898705 0 0 0)
        meshes=(pisiform_rvs.vtp lunate_rvs.vtp scaphoid_rvs.vtp triquetrum_rvs.vtp hamate_rvs.vtp capitate_rvs.vtp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)
    Body humerus_l: mass=4.277953 mass_center=(0 -0.1870919 0) inertia=(0.03252337 0.01121955 0.03650643 0 0 0)
        meshes=humerus_lv.vtp
    Body ulna_l: mass=1.319299 mass_center=(0 -0.1385133 0) inertia=(0.008495921 0.001772613 0.009215865 0 0 0)
        meshes=ulna_lv.vtp
    Body radius_l: mass=1.319299 mass_center=(0 -0.1385133 0) inertia=(0.008495921 0.001772613 0.009215865 0 0 0)
        meshes=radius_lv.vtp
    Body hand_l: mass=0.6071703 mass_center=(0 -0.06641054 0) inertia=(0.001125973 0.0006904788 0.001691484 0 0 0)
        meshes=(pisiform_lvs.vtp lunate_lvs.vtp scaphoid_lvs.vtp triquetrum_lvs.vtp hamate_lvs.vtp capitate_lvs.vtp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)
  JointSet:
    CustomJoint ground_pelvis: socket_parent_frame=ground_offset socket_child_frame=pelvis_offset
      Coordinate pelvis_tilt: default_value=0 range=(-1.570796 1.570796) clamped=false
      Coordinate pelvis_list: default_value=0 range=(-1.570796 1.570796) clamped=false
      Coordinate pelvis_rotation: default_value=0 range=(-1.570796 1.570796) clamped=false
      Coordinate pelvis_tx: default_value=0 range=(-5 5) clamped=false
      Coordinate pelvis_ty: default_value=0 range=(-1 2) clamped=false
      Coordinate pelvis_tz: default_value=0 range=(-3 3) clamped=false
      PhysicalOffsetFrame ground_offset: socket_parent=/ground translation=(0 0 0) [meters]
      PhysicalOffsetFrame pelvis_offset: socket_parent=/bodyset/pelvis translation=(0 0 0)
      SpatialTransform:
        TransformAxis rotation1: coordinates=pelvis_tilt axis=(0 0 1) LinearFunction(coefficients=1 0)
        TransformAxis rotation2: coordinates=pelvis_list axis=(1 0 0) LinearFunction(coefficients=1 0)
        TransformAxis rotation3: coordinates=pelvis_rotation axis=(0 1 0) LinearFunction(coefficients=1 0)
        TransformAxis translation1: coordinates=pelvis_tx axis=(1 0 0) LinearFunction(coefficients=1 0)
        TransformAxis translation2: coordinates=pelvis_ty axis=(0 1 0) LinearFunction(coefficients=1 0)
        TransformAxis translation3: coordinates=pelvis_tz axis=(0 0 1) LinearFunction(coefficients=1 0)
    WeldJoint sacrumjnt: socket_parent_frame=pelvis_offset socket_child_frame=sacrum_offset
      PhysicalOffsetFrame pelvis_offset: socket_parent=/bodyset/pelvis translation=(0.01149432 -0.01954035 0)
      PhysicalOffsetFrame sacrum_offset: socket_parent=/bodyset/sacrum translation=(0 0 0)
    CustomJoint L5_S1_IVDjnt: socket_parent_frame=sacrum_offset socket_child_frame=lumbar5_offset
      Coordinate L5_S1_Flex_Ext: default_value=0 range=(-0.1954769 0.06352998) clamped=true
      Coordinate L5_S1_Lat_Bending: default_value=0 range=(-0.03926991 0.03926991) clamped=false
      Coordinate L5_S1_axial_rotation: default_value=0 range=(-0.1759292 0.1759292) clamped=false
      PhysicalOffsetFrame sacrum_offset: socket_parent=/bodyset/sacrum translation=(-0.1126444 0.0816097 0)
      PhysicalOffsetFrame lumbar5_offset: socket_parent=/bodyset/lumbar5 translation=(0 0 0)
      SpatialTransform: axes_held_at_zero=(translation1 translation2 translation3)
        TransformAxis rotation1: coordinates=L5_S1_Flex_Ext axis=(0 0 1) LinearFunction(coefficients=1 0)
        TransformAxis rotation2: coordinates=L5_S1_Lat_Bending axis=(1 0 0) LinearFunction(coefficients=1 0)
        TransformAxis rotation3: coordinates=L5_S1_axial_rotation axis=(0 1 0) LinearFunction(coefficients=1 0)
    CustomJoint L4_L5_IVDjnt: socket_parent_frame=lumbar5_offset socket_child_frame=lumbar4_offset
      Coordinate L4_L5_Flex_Ext: default_value=0 range=(-99999.9 99999.9) clamped=false
      Coordinate L4_L5_Lat_Bending: default_value=0 range=(-99999.9 99999.9) clamped=false
      Coordinate L4_L5_axial_rotation: default_value=0 range=(-99999.9 99999.9) clamped=false
      PhysicalOffsetFrame lumbar5_offset: socket_parent=/bodyset/lumbar5 translation=(0.009992733 0.02859442 0)
      PhysicalOffsetFrame lumbar4_offset: socket_parent=/bodyset/lumbar4 translation=(0.0009992733 -0.002415069 0)
      SpatialTransform: axes_held_at_zero=(translation1 translation2 translation3)
        TransformAxis rotation1: coordinates=L4_L5_Flex_Ext axis=(0 0 1) LinearFunction(coefficients=1 0)
        TransformAxis rotation2: coordinates=L4_L5_Lat_Bending axis=(1 0 0) LinearFunction(coefficients=1 0)
        TransformAxis rotation3: coordinates=L4_L5_axial_rotation axis=(0 1 0) LinearFunction(coefficients=1 0)
    CustomJoint L3_L4_IVDjnt: socket_parent_frame=lumbar4_offset socket_child_frame=lumbar3_offset
      Coordinate L3_L4_Flex_Ext: default_value=0 range=(-99999.9 99999.9) clamped=false
      Coordinate L3_L4_Lat_Bending: default_value=0 range=(-99999.9 99999.9) clamped=false
      Coordinate L3_L4_axial_rotation: default_value=0 range=(-99999.9 99999.9) clamped=false
      PhysicalOffsetFrame lumbar4_offset: socket_parent=/bodyset/lumbar4 translation=(0 0.03091289 0)
      PhysicalOffsetFrame lumbar3_offset: socket_parent=/bodyset/lumbar3 translation=(-0.000599564 -0.001159233 0)
      SpatialTransform: axes_held_at_zero=(translation1 translation2 translation3)
        TransformAxis rotation1: coordinates=L3_L4_Flex_Ext axis=(0 0 1) LinearFunction(coefficients=1 0)
        TransformAxis rotation2: coordinates=L3_L4_Lat_Bending axis=(1 0 0) LinearFunction(coefficients=1 0)
        TransformAxis rotation3: coordinates=L3_L4_axial_rotation axis=(0 1 0) LinearFunction(coefficients=1 0)
    CustomJoint L2_L3_IVD_jnt: socket_parent_frame=lumbar3_offset socket_child_frame=lumbar2_offset
      Coordinate L2_L3_Flex_Ext: default_value=0 range=(-99999.9 99999.9) clamped=false
      Coordinate L2_L3_Lat_Bending: default_value=0 range=(-99999.9 99999.9) clamped=false
      Coordinate L2_L3_axial_rotation: default_value=0 range=(-99999.9 99999.9) clamped=false
      PhysicalOffsetFrame lumbar3_offset: socket_parent=/bodyset/lumbar3 translation=(-0.007994187 0.03014007 0)
      PhysicalOffsetFrame lumbar2_offset: socket_parent=/bodyset/lumbar2 translation=(-0.001299055 -0.003767508 0)
      SpatialTransform: axes_held_at_zero=(translation1 translation2 translation3)
        TransformAxis rotation1: coordinates=L2_L3_Flex_Ext axis=(0 0 1) LinearFunction(coefficients=1 0)
        TransformAxis rotation2: coordinates=L2_L3_Lat_Bending axis=(1 0 0) LinearFunction(coefficients=1 0)
        TransformAxis rotation3: coordinates=L2_L3_axial_rotation axis=(0 1 0) LinearFunction(coefficients=1 0)
    CustomJoint L1_L2_IVD_jnt: socket_parent_frame=lumbar2_offset socket_child_frame=lumbar1_offset
      Coordinate L1_L2_Flex_Ext: default_value=0 range=(-99999.9 99999.9) clamped=false
      Coordinate L1_L2_Lat_Bending: default_value=0 range=(-99999.9 99999.9) clamped=false
      Coordinate L1_L2_axial_rotation: default_value=0 range=(-99999.9 99999.9) clamped=false
      PhysicalOffsetFrame lumbar2_offset: socket_parent=/bodyset/lumbar2 translation=(-0.009992733 0.02415069 0)
      PhysicalOffsetFrame lumbar1_offset: socket_parent=/bodyset/lumbar1 translation=(0.001398983 -0.003670906 0)
      SpatialTransform: axes_held_at_zero=(translation1 translation2 translation3)
        TransformAxis rotation1: coordinates=L1_L2_Flex_Ext axis=(0 0 1) LinearFunction(coefficients=1 0)
        TransformAxis rotation2: coordinates=L1_L2_Lat_Bending axis=(1 0 0) LinearFunction(coefficients=1 0)
        TransformAxis rotation3: coordinates=L1_L2_axial_rotation axis=(0 1 0) LinearFunction(coefficients=1 0)
    CustomJoint L1_T12_IVD_jnt: socket_parent_frame=lumbar1_offset socket_child_frame=torso_offset
      Coordinate L1_T12_Flex_Ext: default_value=0 range=(-99999.9 99999.9) clamped=false
      Coordinate L1_T12_Lat_Bending: default_value=0 range=(-99999.9 99999.9) clamped=false
      Coordinate L1_T12_axial_rotation: default_value=0 range=(-1.1 1.1) clamped=false
      PhysicalOffsetFrame lumbar1_offset: socket_parent=/bodyset/lumbar1 translation=(-0.01039244 0.02656576 0)
      PhysicalOffsetFrame torso_offset: socket_parent=/bodyset/torso translation=(-0.01289063 0.1114796 0)
      SpatialTransform: axes_held_at_zero=(translation1 translation2 translation3)
        TransformAxis rotation1: coordinates=L1_T12_Flex_Ext axis=(0 0 1) LinearFunction(coefficients=1 0)
        TransformAxis rotation2: coordinates=L1_T12_Lat_Bending axis=(1 0 0) LinearFunction(coefficients=1 0)
        TransformAxis rotation3: coordinates=L1_T12_axial_rotation axis=(0 1 0) LinearFunction(coefficients=1 0)
    CustomJoint Abdjnt: socket_parent_frame=sacrum_offset socket_child_frame=Abdomen_offset
      Coordinate Abs_r3: default_value=0 range=(-1.7 1.7) clamped=false
      Coordinate Abs_r2: default_value=0 range=(-1.7 1.7) clamped=false
      Coordinate Abs_r1: default_value=0 range=(-1.7 1.7) clamped=false
      Coordinate Abs_t1: default_value=0 range=(-99999.9 99999.9) clamped=false locked=true
      Coordinate Abs_t2: default_value=0 range=(-99999.9 99999.9) clamped=false locked=true
      PhysicalOffsetFrame sacrum_offset: socket_parent=/bodyset/sacrum translation=(-0.1126444 0.0816097 0)
      PhysicalOffsetFrame Abdomen_offset: socket_parent=/bodyset/Abdomen translation=(-0.0899346 -0.0869425 0)
      SpatialTransform: axes_held_at_zero=translation3
        TransformAxis rotation1: coordinates=Abs_r3 axis=(0 0 1) LinearFunction(coefficients=1 0)
        TransformAxis rotation2: coordinates=Abs_r2 axis=(1 0 0) LinearFunction(coefficients=1 0)
        TransformAxis rotation3: coordinates=Abs_r1 axis=(0 1 0) LinearFunction(coefficients=1 0)
        TransformAxis translation1: coordinates=Abs_t1 axis=(1 0 0) LinearFunction(coefficients=1 0)
        TransformAxis translation2: coordinates=Abs_t2 axis=(0 1 0) LinearFunction(coefficients=1 0)
    CustomJoint acromial_r: socket_parent_frame=torso_offset socket_child_frame=humerus_r_offset
      Coordinate arm_flex_r: default_value=0 range=(-1.570796 3.1416) clamped=true
      Coordinate arm_add_r: default_value=0 range=(-3.1416 1.570796) clamped=true
      Coordinate arm_rot_r: default_value=0 range=(-2.4435 1.7453) clamped=true
      PhysicalOffsetFrame torso_offset: socket_parent=/bodyset/torso translation=(0.003152707 0.3588793 0.1882529)
      PhysicalOffsetFrame humerus_r_offset: socket_parent=/bodyset/humerus_r translation=(0 0 0)
      SpatialTransform: axes_held_at_zero=(translation1 translation2 translation3)
        TransformAxis rotation1: coordinates=arm_flex_r axis=(0 0 1) LinearFunction(coefficients=1 0)
        TransformAxis rotation2: coordinates=arm_add_r axis=(1 0 0) LinearFunction(coefficients=1 0)
        TransformAxis rotation3: coordinates=arm_rot_r axis=(0 1 0) LinearFunction(coefficients=1 0)
    CustomJoint elbow_r: socket_parent_frame=humerus_r_offset socket_child_frame=ulna_r_offset
      Coordinate elbow_flex_r: default_value=0 range=(-0.1745 2.7925) clamped=true
      PhysicalOffsetFrame humerus_r_offset: socket_parent=/bodyset/humerus_r
          translation=(0.0144524 -0.3147695 -0.01055012)
      PhysicalOffsetFrame ulna_r_offset: socket_parent=/bodyset/ulna_r translation=(0 0 0)
      SpatialTransform: axes_held_at_zero=(rotation2 rotation3 translation1 translation2 translation3)
        TransformAxis rotation1: coordinates=elbow_flex_r axis=(0.226047 0.022269 0.9738618)
            LinearFunction(coefficients=1 0)
    CustomJoint radioulnar_r: socket_parent_frame=ulna_r_offset socket_child_frame=radius_r_offset
      Coordinate pro_sup_r: default_value=0 range=(-1.5708 2.0944) clamped=true
      PhysicalOffsetFrame ulna_r_offset: socket_parent=/bodyset/ulna_r
          translation=(-0.008115453 -0.01569164 0.03146653)
      PhysicalOffsetFrame radius_r_offset: socket_parent=/bodyset/radius_r translation=(0 0 0)
      SpatialTransform: axes_held_at_zero=(rotation2 rotation3 translation1 translation2 translation3)
        TransformAxis rotation1: coordinates=pro_sup_r axis=(0.05639803 0.9984065 0.001952)
            LinearFunction(coefficients=1 0)
    WeldJoint radius_hand_r: socket_parent_frame=radius_r_offset socket_child_frame=hand_r_offset
      PhysicalOffsetFrame radius_r_offset: socket_parent=/bodyset/radius_r
          translation=(-0.0106127 -0.2845186 0.0164191)
      PhysicalOffsetFrame hand_r_offset: socket_parent=/bodyset/hand_r translation=(0 0 0)
    CustomJoint acromial_l: socket_parent_frame=torso_offset socket_child_frame=humerus_l_offset
      Coordinate arm_flex_l: default_value=0 range=(-1.570796 3.1416) clamped=true
      Coordinate arm_add_l: default_value=0 range=(-3.1416 1.570796) clamped=true
      Coordinate arm_rot_l: default_value=0 range=(-2.4435 1.7453) clamped=true
      PhysicalOffsetFrame torso_offset: socket_parent=/bodyset/torso translation=(0.003152707 0.3588793 -0.1882529)
      PhysicalOffsetFrame humerus_l_offset: socket_parent=/bodyset/humerus_l translation=(0 0 0)
      SpatialTransform: axes_held_at_zero=(translation1 translation2 translation3)
        TransformAxis rotation1: coordinates=arm_flex_l axis=(0 0 1) LinearFunction(coefficients=1 0)
        TransformAxis rotation2: coordinates=arm_add_l axis=(-1 0 0) LinearFunction(coefficients=1 0)
        TransformAxis rotation3: coordinates=arm_rot_l axis=(0 -1 0) LinearFunction(coefficients=1 0)
    CustomJoint elbow_l: socket_parent_frame=humerus_l_offset socket_child_frame=ulna_l_offset
      Coordinate elbow_flex_l: default_value=0 range=(-0.1745 2.7925) clamped=false
      PhysicalOffsetFrame humerus_l_offset: socket_parent=/bodyset/humerus_l
          translation=(0.01494897 -0.3255848 0.01091261)
      PhysicalOffsetFrame ulna_l_offset: socket_parent=/bodyset/ulna_l translation=(0 0 0)
      SpatialTransform: axes_held_at_zero=(rotation2 rotation3 translation1 translation2 translation3)
        TransformAxis rotation1: coordinates=elbow_flex_l axis=(-0.226047 -0.022269 0.9738618)
            LinearFunction(coefficients=1 0)
    CustomJoint radioulnar_l: socket_parent_frame=ulna_l_offset socket_child_frame=radius_l_offset
      Coordinate pro_sup_l: default_value=0 range=(-1.5708 2.0944) clamped=true
      PhysicalOffsetFrame ulna_l_offset: socket_parent=/bodyset/ulna_l translation=(-0.007731 -0.01494829 -0.02997587)
      PhysicalOffsetFrame radius_l_offset: socket_parent=/bodyset/radius_l translation=(0 0 0)
      SpatialTransform: axes_held_at_zero=(rotation2 rotation3 translation1 translation2 translation3)
        TransformAxis rotation1: coordinates=pro_sup_l axis=(-0.05639803 -0.9984065 0.001952)
            LinearFunction(coefficients=1 0)
    WeldJoint radius_hand_l: socket_parent_frame=radius_l_offset socket_child_frame=hand_l_offset
      PhysicalOffsetFrame radius_l_offset: socket_parent=/bodyset/radius_l
          translation=(-0.01010995 -0.2710401 -0.01564128)
      PhysicalOffsetFrame hand_l_offset: socket_parent=/bodyset/hand_l translation=(0 0 0)
  ForceSet:
    Thelen2003Muscle rect_abd_r: max_isometric_force=662 optimal_fiber_length=0.3105762 tendon_slack_length=0.08445135
        pennation_angle_at_optimal=0 [radians] FmaxTendonStrain=0.033 FmaxMuscleStrain=0.6 KshapeActive=0.5
        KshapePassive=4 Af=0.3 Flen=1.8 activation_time_constant=0.01 [seconds]
        deactivation_time_constant=0.04 [seconds]
      PathPoint rect_abd_r_P1: pelvis (-0.02988524 -0.08046027 0.01264376)
      PathPoint rect_abd_r_P2: torso (0.09193315 0.2144408 0.03432846)
    Thelen2003Muscle rect_abd_l: max_isometric_force=662 optimal_fiber_length=0.3105903 tendon_slack_length=0.08445518
        pennation_angle_at_optimal=0 FmaxTendonStrain=0.033 FmaxMuscleStrain=0.6 KshapeActive=0.5 KshapePassive=4
        Af=0.3 Flen=1.8 activation_time_constant=0.01 deactivation_time_constant=0.04
      PathPoint rect_abd_l_P1: pelvis (-0.02988524 -0.08046027 -0.01264376)
      PathPoint rect_abd_l_P2: torso (0.09193315 0.2141326 -0.03432846)
    Thelen2003Muscle Ps_L1_VB_r: max_isometric_force=267.4139 optimal_fiber_length=0.2041994
        tendon_slack_length=0.06064807 pennation_angle_at_optimal=0.18675
      PathPoint Ps_L1_VB_r_P1: lumbar1 (-0.01015212 0.02247947 0.02214739)
      PathPoint Ps_L1_VB_r_P2: pelvis (-0.02735649 -0.06551765 0.08724192)
    Thelen2003Muscle Ps_L1_TP_r: max_isometric_force=77.19164 optimal_fiber_length=0.2016049
        tendon_slack_length=0.05983658 pennation_angle_at_optimal=0.18675
      PathPoint Ps_L1_TP_r_P1: lumbar1 (-0.0232331 0.01416042 0.02505446)
      PathPoint Ps_L1_TP_r_P2: pelvis (-0.02735649 -0.06551765 0.08724192)
    Thelen2003Muscle Ps_L1_L2_IVD_r: max_isometric_force=147.1507 optimal_fiber_length=0.1892945
        tendon_slack_length=0.05626814 pennation_angle_at_optimal=0.1867502
      PathPoint Ps_L1_L2_IVD_r_P1: lumbar1 (-0.001252709 0.003388806 0.02290417)
      PathPoint Ps_L1_L2_IVD_r_P2: pelvis (-0.02735649 -0.06551765 0.08724192)
    Thelen2003Muscle Ps_L2_TP_r: max_isometric_force=258.58 optimal_fiber_length=0.1771511
        tendon_slack_length=0.0526752 pennation_angle_at_optimal=0.1867502
      PathPoint Ps_L2_TP_r_P1: lumbar2 (-0.02160569 0.01409145 0.02463787)
      PathPoint Ps_L2_TP_r_P2: pelvis (-0.02735649 -0.06551765 0.08724192)
    Thelen2003Muscle Ps_L2_L3_IVD_r: max_isometric_force=150.5407 optimal_fiber_length=0.1644331
        tendon_slack_length=0.0488681 pennation_angle_at_optimal=0.1867502
      PathPoint Ps_L2_L3_IVD_r_P1: lumbar2 (0.001961094 0.003270188 0.02375075)
      PathPoint Ps_L2_L3_IVD_r_P2: pelvis (-0.02735649 -0.06551765 0.08724192)
    Thelen2003Muscle Ps_L3_TP_r: max_isometric_force=127.7698 optimal_fiber_length=0.1547733
        tendon_slack_length=0.04596692 pennation_angle_at_optimal=0.1867502
      PathPoint Ps_L3_TP_r_P1: lumbar3 (-0.02448869 0.02002411 0.03129416)
      PathPoint Ps_L3_TP_r_P2: pelvis (-0.02735649 -0.06551765 0.08724192)
    Thelen2003Muscle Ps_L3_L4_IVD_r: max_isometric_force=45.35878 optimal_fiber_length=0.140359
        tendon_slack_length=0.04172539 pennation_angle_at_optimal=0.1867502
      PathPoint Ps_L3_L4_IVD_r_P1: lumbar3 (0.001151093 0.005999641 0.02342452)
      PathPoint Ps_L3_L4_IVD_r_P2: pelvis (-0.02735649 -0.06551765 0.08724192)
    Thelen2003Muscle Ps_L4_TP_r: max_isometric_force=202.6902 optimal_fiber_length=0.1347638
        tendon_slack_length=0.04004409 pennation_angle_at_optimal=0.1867502
      PathPoint Ps_L4_TP_r_P1: lumbar4 (-0.01563763 0.02409892 0.02865518)
      PathPoint Ps_L4_TP_r_P2: pelvis (-0.02735649 -0.06551765 0.08724192)
    Thelen2003Muscle Ps_L4_L5_IVD_r: max_isometric_force=85.10187 optimal_fiber_length=0.1172404
        tendon_slack_length=0.034825 pennation_angle_at_optimal=0.1867502
      PathPoint Ps_L4_L5_IVD_r_P1: lumbar4 (0.005415692 0.003813433 0.02280805)
      PathPoint Ps_L4_L5_IVD_r_P2: pelvis (-0.02735649 -0.06551765 0.08724192)
    Thelen2003Muscle Ps_L5_TP_r: max_isometric_force=186.3623 optimal_fiber_length=0.1159877
        tendon_slack_length=0.03443735 pennation_angle_at_optimal=0.1867502
      PathPoint Ps_L5_TP_r_P1: lumbar5 (-0.005615926 0.02814986 0.02800328)
      PathPoint Ps_L5_TP_r_P2: pelvis (-0.02735649 -0.06551765 0.08724192)
    Thelen2003Muscle Ps_L5_VB_r: max_isometric_force=232.8923 optimal_fiber_length=0.1031568
        tendon_slack_length=0.03061576 pennation_angle_at_optimal=0.1867502
      PathPoint Ps_L5_VB_r_P1: lumbar5 (0.009992733 0.0119884 0.02104002)
      PathPoint Ps_L5_VB_r_P2: pelvis (-0.02735649 -0.06551765 0.08724192)
    Thelen2003Muscle Ps_L1_VB_l: max_isometric_force=267.4139 optimal_fiber_length=0.2041994
        tendon_slack_length=0.06064807 pennation_angle_at_optimal=0.18675
      PathPoint Ps_L1_VB_l_P1: lumbar1 (-0.01015212 0.02247947 -0.02214739)
      PathPoint Ps_L1_VB_l_P2: pelvis (-0.02735649 -0.06551765 -0.08724192)
    Thelen2003Muscle Ps_L1_TP_l: max_isometric_force=77.19164 optimal_fiber_length=0.2016048
        tendon_slack_length=0.05983655 pennation_angle_at_optimal=0.18675
      PathPoint Ps_L1_TP_l_P1: lumbar1 (-0.0232331 0.01416042 -0.02505978)
      PathPoint Ps_L1_TP_l_P2: pelvis (-0.02735649 -0.06551765 -0.08724192)
    Thelen2003Muscle Ps_L1_L2_IVD_l: max_isometric_force=147.1507 optimal_fiber_length=0.1892946
        tendon_slack_length=0.05626816 pennation_angle_at_optimal=0.1867502
      PathPoint Ps_L1_L2_IVD_l_P1: lumbar1 (-0.001252709 0.003388806 -0.02290041)
      PathPoint Ps_L1_L2_IVD_l_P2: pelvis (-0.02735649 -0.06551765 -0.08724192)
    Thelen2003Muscle Ps_L2_TP_l: max_isometric_force=258.58 optimal_fiber_length=0.1771511
        tendon_slack_length=0.0526752 pennation_angle_at_optimal=0.1867502
      PathPoint Ps_L2_TP_l_P1: lumbar2 (-0.02160569 0.01409145 -0.02463898)
      PathPoint Ps_L2_TP_l_P2: pelvis (-0.02735649 -0.06551765 -0.08724192)
    Thelen2003Muscle Ps_L2_L3_IVD_l: max_isometric_force=150.5407 optimal_fiber_length=0.1644331
        tendon_slack_length=0.04886809 pennation_angle_at_optimal=0.1867502
      PathPoint Ps_L2_L3_IVD_l_P1: lumbar2 (0.001961094 0.003270188 -0.02375308)
      PathPoint Ps_L2_L3_IVD_l_P2: pelvis (-0.02735649 -0.06551765 -0.08724192)
    Thelen2003Muscle Ps_L3_TP_l: max_isometric_force=127.7698 optimal_fiber_length=0.1547733
        tendon_slack_length=0.04596692 pennation_angle_at_optimal=0.1867502
      PathPoint Ps_L3_TP_l_P1: lumbar3 (-0.02448869 0.02002411 -0.03129427)
      PathPoint Ps_L3_TP_l_P2: pelvis (-0.02735649 -0.06551765 -0.08724192)
    Thelen2003Muscle Ps_L3_L4_IVD_l: max_isometric_force=45.35878 optimal_fiber_length=0.140359
        tendon_slack_length=0.0417254 pennation_angle_at_optimal=0.1867502
      PathPoint Ps_L3_L4_IVD_l_P1: lumbar3 (0.001151093 0.005999641 -0.02342087)
      PathPoint Ps_L3_L4_IVD_l_P2: pelvis (-0.02735649 -0.06551765 -0.08724192)
    Thelen2003Muscle Ps_L4_TP_l: max_isometric_force=202.6902 optimal_fiber_length=0.1347637
        tendon_slack_length=0.04004408 pennation_angle_at_optimal=0.1867502
      PathPoint Ps_L4_TP_l_P1: lumbar4 (-0.01563763 0.02409892 -0.02865873)
      PathPoint Ps_L4_TP_l_P2: pelvis (-0.02735649 -0.06551765 -0.08724192)
    Thelen2003Muscle Ps_L4_L5_IVD_l: max_isometric_force=85.10187 optimal_fiber_length=0.1172404
        tendon_slack_length=0.03482499 pennation_angle_at_optimal=0.1867502
      PathPoint Ps_L4_L5_IVD_l_P1: lumbar4 (0.005415692 0.003813433 -0.02281182)
      PathPoint Ps_L4_L5_IVD_l_P2: pelvis (-0.02735649 -0.06551765 -0.08724192)
    Thelen2003Muscle Ps_L5_TP_l: max_isometric_force=186.3623 optimal_fiber_length=0.1159877
        tendon_slack_length=0.03443734 pennation_angle_at_optimal=0.1867502
      PathPoint Ps_L5_TP_l_P1: lumbar5 (-0.005615926 0.02814986 -0.02800538)
      PathPoint Ps_L5_TP_l_P2: pelvis (-0.02735649 -0.06551765 -0.08724192)
    Thelen2003Muscle Ps_L5_VB_l: max_isometric_force=232.8923 optimal_fiber_length=0.1031568
        tendon_slack_length=0.03061576 pennation_angle_at_optimal=0.1867502
      PathPoint Ps_L5_VB_l_P1: lumbar5 (0.009992733 0.0119884 -0.02104002)
      PathPoint Ps_L5_VB_l_P2: pelvis (-0.02735649 -0.06551765 -0.08724192)
    Thelen2003Muscle QL_post_I_1_L3_r: max_isometric_force=75.59353 optimal_fiber_length=0.04253121
        tendon_slack_length=0.03569927 pennation_angle_at_optimal=0.1291544
      PathPoint I_1_r_P1: pelvis (-0.1287364 0.0885063 0.06781651)
      PathPoint L3_TP_r_P2: lumbar3 (-0.02897893 0.01896313 0.0335533)
    Thelen2003Muscle QL_post_I_2_L4_r: max_isometric_force=156.4149 optimal_fiber_length=0.02612504
        tendon_slack_length=0.02199459 pennation_angle_at_optimal=0.1291544
      PathPoint I_2_r_P1: pelvis (-0.1218398 0.09310403 0.07241424)
      PathPoint L4_TP_r_P2: lumbar4 (-0.02198401 0.02516502 0.0335533)
    Thelen2003Muscle QL_post_I_2_L3_r: max_isometric_force=58.56422 optimal_fiber_length=0.03817338
        tendon_slack_length=0.03210034 pennation_angle_at_optimal=0.1291544
      PathPoint I_2_r_P1: pelvis (-0.1218398 0.09310403 0.07241424)
      PathPoint L3_TP_r_P2: lumbar3 (-0.02897893 0.01896313 0.0335533)
    Thelen2003Muscle QL_post_I_2_L2_r: max_isometric_force=36.55072 optimal_fiber_length=0.05402842
        tendon_slack_length=0.04541793 pennation_angle_at_optimal=0.1291544
      PathPoint I_2_r_P1: pelvis (-0.1218398 0.09310403 0.07241424)
      PathPoint L2_TP_r_P2: lumbar2 (-0.03097747 0.01159233 0.0335533)
    Thelen2003Muscle QL_post_I_3_L1_r: max_isometric_force=77.19129 optimal_fiber_length=0.07258237
        tendon_slack_length=0.06096919 pennation_angle_at_optimal=0.1291544
      PathPoint L1_TP_P1: lumbar1 (-0.03197675 0.01352439 0.03543583)
      PathPoint I_3_r_P1: pelvis (-0.1126444 0.1022995 0.07586254)
    Thelen2003Muscle QL_post_I_3_L2_r: max_isometric_force=56.48747 optimal_fiber_length=0.05322072
        tendon_slack_length=0.04464889 pennation_angle_at_optimal=0.1291544
      PathPoint L2_TP_r_P2: lumbar2 (-0.03097747 0.01159233 0.0335533)
      PathPoint I_3_r_P1: pelvis (-0.1126444 0.1022995 0.07586254)
    Thelen2003Muscle QL_post_I_3_L3_r: max_isometric_force=96.36098 optimal_fiber_length=0.03855784
        tendon_slack_length=0.03237312 pennation_angle_at_optimal=0.1291544
      PathPoint L3_TP_r_P2: lumbar3 (-0.02897893 0.01896313 0.0335533)
      PathPoint I_3_r_P1: pelvis (-0.1126444 0.1022995 0.07586254)
    Thelen2003Muscle QL_post_I_1_L3_l: max_isometric_force=75.59353 optimal_fiber_length=0.04234015
        tendon_slack_length=0.0355389 pennation_angle_at_optimal=0.1291544
      PathPoint I.1_l_P1: pelvis (-0.1305491 0.0913793 -0.06689363)
      PathPoint L3_TP_l_P2: lumbar3 (-0.02897893 0.01932056 -0.0335533)
    Thelen2003Muscle QL_post_I_2_L4_l: max_isometric_force=156.4149 optimal_fiber_length=0.0261539
        tendon_slack_length=0.0220189 pennation_angle_at_optimal=0.1291544
      PathPoint I_2_l_P1: pelvis (-0.1218398 0.09310403 -0.07241424)
      PathPoint L4_TP_l_P2: lumbar4 (-0.02198401 0.02516502 -0.03322109)
    Thelen2003Muscle QL_post_I_2_L3_l: max_isometric_force=58.56422 optimal_fiber_length=0.03817338
        tendon_slack_length=0.03210034 pennation_angle_at_optimal=0.1291544
      PathPoint I_2_l_P1: pelvis (-0.1218398 0.09310403 -0.07241424)
      PathPoint L3_TP_l_P2: lumbar3 (-0.02897893 0.01896313 -0.0335533)
    Thelen2003Muscle QL_post_I_2_L2_l: max_isometric_force=36.55072 optimal_fiber_length=0.05402842
        tendon_slack_length=0.04541793 pennation_angle_at_optimal=0.1291544
      PathPoint I_2_l_P1: pelvis (-0.1218398 0.09310403 -0.07241424)
      PathPoint L2_TP_l_P2: lumbar2 (-0.03097747 0.01159233 -0.0335533)
    Thelen2003Muscle QL_post_I_3_L1_l: max_isometric_force=77.19129 optimal_fiber_length=0.07258041
        tendon_slack_length=0.06096755 pennation_angle_at_optimal=0.1291544
      PathPoint L1_TP_l_P1: lumbar1 (-0.03184634 0.01384144 -0.03543583)
      PathPoint I_3_l_P1: pelvis (-0.1126444 0.1022995 -0.07586254)
    Thelen2003Muscle QL_post_I_3_L2_l: max_isometric_force=56.48747 optimal_fiber_length=0.05322072
        tendon_slack_length=0.04464889 pennation_angle_at_optimal=0.1291544
      PathPoint L2_TP_l_P2: lumbar2 (-0.03097747 0.01159233 -0.0335533)
      PathPoint I_3_l_P1: pelvis (-0.1126444 0.1022995 -0.07586254)
    Thelen2003Muscle QL_post_I_3_L3_l: max_isometric_force=96.36098 optimal_fiber_length=0.03855784
        tendon_slack_length=0.03237312 pennation_angle_at_optimal=0.1291544
      PathPoint L3_TP_l_P2: lumbar3 (-0.02897893 0.01896313 -0.0335533)
      PathPoint I_3_l_P1: pelvis (-0.1126444 0.1022995 -0.07586254)
    Thelen2003Muscle QL_ant_I_2_T12_r: max_isometric_force=45.39083 optimal_fiber_length=0.1098065
        tendon_slack_length=0.05700027 pennation_angle_at_optimal=0.1291544
      PathPoint I_2_r_P1: pelvis (-0.1218398 0.09310403 0.07241424)
      PathPoint T12_r_P2: torso (-0.01419048 0.1255836 0.02214739)
    Thelen2003Muscle QL_ant_I_3_T12_r: max_isometric_force=85.28362 optimal_fiber_length=0.1074946
        tendon_slack_length=0.05583275 pennation_angle_at_optimal=0.1291544
      PathPoint I_3_r_P1: pelvis (-0.1126444 0.1022995 0.07586254)
      PathPoint T12_r_P2: torso (-0.009992733 0.1265496 0.02104002)
    Thelen2003Muscle QL_ant_I_2_12_1_r: max_isometric_force=28.08042 optimal_fiber_length=0.09998689
        tendon_slack_length=0.05191088 pennation_angle_at_optimal=0.1291544
      PathPoint I_2_r_P2: pelvis (-0.1218398 0.09310403 0.07241424)
      PathPoint T12_1_r_P3: torso (-0.04097021 0.1139913 0.0476169)
    Thelen2003Muscle QL_ant_I_3_12_1_r: max_isometric_force=53.17357 optimal_fiber_length=0.09851047
        tendon_slack_length=0.05116942 pennation_angle_at_optimal=0.1291544
      PathPoint I_3_r_P1: pelvis (-0.1126444 0.1022995 0.07586254)
      PathPoint T12_1_r_P2: torso (-0.04025143 0.1201748 0.041471)
    Thelen2003Muscle QL_ant_I_3_12_2_r: max_isometric_force=35.24989 optimal_fiber_length=0.09332479
        tendon_slack_length=0.04846958 pennation_angle_at_optimal=0.1291544
      PathPoint I_3_r_P1: pelvis (-0.1126444 0.1022995 0.07586254)
      PathPoint T12_2_r_P2: torso (-0.04021076 0.113856 0.0510276)
    Thelen2003Muscle QL_ant_I_3_12_3_r: max_isometric_force=40.627 optimal_fiber_length=0.08037117
        tendon_slack_length=0.04174887 pennation_angle_at_optimal=0.1291544
      PathPoint I_3_r_P2: pelvis (-0.1126444 0.1022995 0.07586254)
      PathPoint T12_3_r_P3: torso (-0.03798238 0.1075759 0.0603738)
    Thelen2003Muscle QL_ant_I_2_T12_l: max_isometric_force=45.39083 optimal_fiber_length=0.1099472
        tendon_slack_length=0.05707329 pennation_angle_at_optimal=0.1291544
      PathPoint I_2_l_P1: pelvis (-0.1218398 0.09310403 -0.07241424)
      PathPoint T12_l_P2: torso (-0.009992733 0.1265496 -0.02104002)
    Thelen2003Muscle QL_ant_I_3_T12_l: max_isometric_force=85.28362 optimal_fiber_length=0.1074946
        tendon_slack_length=0.05583275 pennation_angle_at_optimal=0.1291544
      PathPoint I_3_l_P1: pelvis (-0.1126444 0.1022995 -0.07586254)
      PathPoint T12_l_P2: torso (-0.009992733 0.1265496 -0.02104002)
    Thelen2003Muscle QL_ant_I_2_12_1_l: max_isometric_force=28.08042 optimal_fiber_length=0.09998689
        tendon_slack_length=0.05191088 pennation_angle_at_optimal=0.1291544
      PathPoint I_2_l_P2: pelvis (-0.1218398 0.09310403 -0.07241424)
      PathPoint T12_1_l_P3: torso (-0.04097021 0.1139913 -0.0476169)
    Thelen2003Muscle QL_ant_I_3_12_1_l: max_isometric_force=53.17357 optimal_fiber_length=0.09853639
        tendon_slack_length=0.05118288 pennation_angle_at_optimal=0.1291544
      PathPoint I_3_l_P1: pelvis (-0.1126444 0.1022995 -0.07586254)
      PathPoint T12_1_l_P2: torso (-0.03997093 0.1197874 -0.04097268)
    Thelen2003Muscle QL_ant_I_3_12_2_l: max_isometric_force=35.24989 optimal_fiber_length=0.09332479
        tendon_slack_length=0.04846958 pennation_angle_at_optimal=0.1291544
      PathPoint I_3_l_P1: pelvis (-0.1126444 0.1022995 -0.07586254)
      PathPoint T12_2_l_P2: torso (-0.04021076 0.113856 -0.0510276)
    Thelen2003Muscle QL_ant_I_3_12_3_l: max_isometric_force=40.627 optimal_fiber_length=0.08033934
        tendon_slack_length=0.04173234 pennation_angle_at_optimal=0.1291544
      PathPoint I_3_l_P2: pelvis (-0.1126444 0.1022995 -0.07586254)
      PathPoint T12_3_l_P3: torso (-0.03797239 0.1072291 -0.06090533)
    Thelen2003Muscle MF_m1t_2_r: max_isometric_force=59.72683 optimal_fiber_length=0.1019999
        tendon_slack_length=0.03059998 pennation_angle_at_optimal=0
      PathPoint MF_m1t_2_r_P1: sacrum (-0.1395687 0.09652543 0.02413808)
      PathPoint MF_m1t_2_r_P2: lumbar1 (-0.04396803 -0.01545644 0.003432846)
    Thelen2003Muscle MF_m1t_3_r: max_isometric_force=99.76112 optimal_fiber_length=0.1169214
        tendon_slack_length=0.03507643 pennation_angle_at_optimal=0
      PathPoint MF_m1t_3_r_P1: pelvis (-0.1518768 0.06243683 0.05517287)
      PathPoint MF_m1t_3_r_P2: lumbar1 (-0.04396803 -0.01545644 0.003432846)
    Thelen2003Muscle MF_m2t_1_r: max_isometric_force=57.47237 optimal_fiber_length=0.06967134
        tendon_slack_length=0.02120026 pennation_angle_at_optimal=0
      PathPoint MF_m2t_1_r_P1: sacrum (-0.1388032 0.09795245 0.02348911)
      PathPoint MF_m2t_1_r_P2: lumbar2 (-0.0449673 -0.01776525 0.004429479)
    Thelen2003Muscle MF_m2t_2_r: max_isometric_force=145.8914 optimal_fiber_length=0.09520804
        tendon_slack_length=0.02894977 pennation_angle_at_optimal=0
      PathPoint MF_m2t_2_r_P1: pelvis (-0.1540239 0.05632219 0.05402332)
      PathPoint MF_m2t_2_r_P2: lumbar2 (-0.0449673 -0.01776525 0.004030826)
    Thelen2003Muscle MF_m2t_3_r: max_isometric_force=161.1852 optimal_fiber_length=0.1076504
        tendon_slack_length=0.03279006 pennation_angle_at_optimal=0
      PathPoint MF_m2t_3_r_P1: pelvis (-0.1574722 0.04137957 0.05172446)
      PathPoint MF_m2t_3_r_P2: lumbar2 (-0.04396803 -0.01810172 0.002619306)
    Thelen2003Muscle MF_m3s_r: max_isometric_force=83.72206 optimal_fiber_length=0.04403875
        tendon_slack_length=0.0183261 pennation_angle_at_optimal=0
      PathPoint MF_m3s_r_P1: sacrum (-0.1402308 0.09655232 0.02183922)
      PathPoint MF_m3s_r_P2: lumbar3 (-0.04196948 -0.006234048 0.003219489)
    Thelen2003Muscle MF_m3t_1_r: max_isometric_force=90.97846 optimal_fiber_length=0.1215717
        tendon_slack_length=0.04041611 pennation_angle_at_optimal=0
      PathPoint MF_m3t_1_r_P1: pelvis (-0.1768919 0.002400705 0.01880609)
      PathPoint MF_m3t_1_r_P2: lumbar3 (-0.04796512 -0.009877827 0.001840604)
    Thelen2003Muscle MF_m3t_2_r: max_isometric_force=90.97846 optimal_fiber_length=0.1008939
        tendon_slack_length=0.03359587 pennation_angle_at_optimal=0
      PathPoint MF_m3t_2_r_P1: pelvis (-0.1690275 0.02451372 0.02541636)
      PathPoint MF_m3t_2_r_P2: lumbar3 (-0.04796512 -0.009882464 0.002945603)
    Thelen2003Muscle MF_m3t_3_r: max_isometric_force=90.97846 optimal_fiber_length=0.1009012
        tendon_slack_length=0.0335983 pennation_angle_at_optimal=0
      PathPoint MF_m3t_3_r_P1: pelvis (-0.1689666 0.02413808 0.02528751)
      PathPoint MF_m3t_3_r_P2: lumbar3 (-0.04796512 -0.009882464 0.002945603)
    Thelen2003Muscle MF_m4s_r: max_isometric_force=101.066 optimal_fiber_length=0.04655175
        tendon_slack_length=0.02940682 pennation_angle_at_optimal=0
      PathPoint MF_m4s_r_P1: sacrum (-0.1651608 0.06288533 0.02068978)
      PathPoint MF_m4s_r_P2: lumbar4 (-0.03597384 -0.0002079085 0.002483653)
    Thelen2003Muscle MF_m4t_1_r: max_isometric_force=90.11722 optimal_fiber_length=0.06732199
        tendon_slack_length=0.0272572 pennation_angle_at_optimal=0
      PathPoint MF_m4t_1_r_P1: sacrum (-0.1749815 0.04773191 0.01765379)
      PathPoint MF_m4t_1_r_P2: lumbar4 (-0.04296875 0.0001624955 0.003189424)
    Thelen2003Muscle MF_m4t_2_r: max_isometric_force=90.11722 optimal_fiber_length=0.08887235
        tendon_slack_length=0.03601435 pennation_angle_at_optimal=0
      PathPoint MF_m4t_2_r_P1: pelvis (-0.1735643 0.009195459 0.01839092)
      PathPoint MF_m4t_2_r_P2: lumbar4 (-0.04396803 0.0001642247 0.003189225)
    Thelen2003Muscle MF_m4t_3_r: max_isometric_force=90.11722 optimal_fiber_length=0.1023854
        tendon_slack_length=0.04142312 pennation_angle_at_optimal=0
      PathPoint MF_m4t_3_r_P1: pelvis (-0.1839092 -0.00459773 0.01609205)
      PathPoint MF_m4t_3_r_P2: lumbar4 (-0.0449673 0.0001642247 0.003189225)
    Thelen2003Muscle MF_m5s_r: max_isometric_force=34.87635 optimal_fiber_length=0.01559348
        tendon_slack_length=0.00986526 pennation_angle_at_optimal=0
      PathPoint MF_m5s_r_P1: sacrum (-0.1499492 0.07617323 0.01379319)
      PathPoint MF_m5s_r_P2: lumbar5 (-0.03097747 0.01642247 0.004351232)
    Thelen2003Muscle MF_m5t_1_r: max_isometric_force=34.87635 optimal_fiber_length=0.08716138
        tendon_slack_length=0.03520861 pennation_angle_at_optimal=0
      PathPoint MF_m5t_1_r_P1: sacrum (-0.2000783 0.006010635 0.01153237)
      PathPoint MF_m5t_1_r_P2: lumbar5 (-0.0354842 0.01629013 0.003240075)
    Thelen2003Muscle MF_m5t_2_r: max_isometric_force=34.87635 optimal_fiber_length=0.0652408
        tendon_slack_length=0.02641793 pennation_angle_at_optimal=0
      PathPoint MF_m5t_2_r_P1: sacrum (-0.1874908 0.02949651 0.01345755)
      PathPoint MF_m5t_2_r_P2: lumbar5 (-0.03452649 0.01538757 0.003069042)
    Thelen2003Muscle MF_m5t_3_r: max_isometric_force=34.87635 optimal_fiber_length=0.04675727
        tendon_slack_length=0.01895565 pennation_angle_at_optimal=0
      PathPoint MF_m5t_3_r_P1: sacrum (-0.175031 0.04894789 0.01332962)
      PathPoint MF_m5t_3_r_P2: lumbar5 (-0.03279895 0.01472903 0.002570017)
    Thelen2003Muscle MF_m4_laminar_r: max_isometric_force=25.94666 optimal_fiber_length=0.03451779
        tendon_slack_length=0.01315434 pennation_angle_at_optimal=0
      PathPoint MF_m4_laminar_r_P1: sacrum (-0.1471274 0.08906711 0.02068978)
      PathPoint MF_m4_laminar_r_P2: lumbar4 (-0.03397529 0.005615945 0.007685146)
    Thelen2003Muscle MF_m5_laminar_r: max_isometric_force=55.93696 optimal_fiber_length=0.02977939
        tendon_slack_length=0.0112836 pennation_angle_at_optimal=0
      PathPoint MF_m5_laminar_r_P1: pelvis (-0.1586217 0.05172446 0.01379319)
      PathPoint MF_m5_laminar_r_P2: lumbar5 (-0.02897893 0.0173885 0.006245565)
    Thelen2003Muscle MF_m1t_2_l: max_isometric_force=59.72683 optimal_fiber_length=0.1019999
        tendon_slack_length=0.03059998 pennation_angle_at_optimal=0
      PathPoint MF_m1t_2_l_P1: sacrum (-0.1395687 0.09652543 -0.02413808)
      PathPoint MF_m1t_2_l_P2: lumbar1 (-0.04396803 -0.01545644 -0.003432846)
    Thelen2003Muscle MF_m1t_3_l: max_isometric_force=99.76112 optimal_fiber_length=0.1169519
        tendon_slack_length=0.03508558 pennation_angle_at_optimal=0
      PathPoint MF_m1t_3_l_P1: pelvis (-0.1517251 0.06206935 -0.05517276)
      PathPoint MF_m1t_3_l_P2: lumbar1 (-0.04396803 -0.01545644 -0.003432846)
    Thelen2003Muscle MF_m2t_1_l: max_isometric_force=57.47237 optimal_fiber_length=0.069898
        tendon_slack_length=0.02126923 pennation_angle_at_optimal=0
      PathPoint MF_m2t_1_l_P1: sacrum (-0.1388032 0.09795245 -0.02528751)
      PathPoint MF_m2t_1_l_P2: lumbar2 (-0.0449673 -0.01776525 -0.004030826)
    Thelen2003Muscle MF_m2t_2_l: max_isometric_force=145.8914 optimal_fiber_length=0.09520804
        tendon_slack_length=0.02894977 pennation_angle_at_optimal=0
      PathPoint MF_m2t_2_l_P1: pelvis (-0.1540239 0.05632219 -0.05402332)
      PathPoint MF_m2t_2_l_P2: lumbar2 (-0.0449673 -0.01776525 -0.004030826)
    Thelen2003Muscle MF_m2t_3_l: max_isometric_force=161.1852 optimal_fiber_length=0.1075517
        tendon_slack_length=0.03276001 pennation_angle_at_optimal=0
      PathPoint MF_m2t_3_l_P1: pelvis (-0.1574722 0.04137957 -0.05172446)
      PathPoint MF_m2t_3_l_P2: lumbar2 (-0.04396803 -0.01810172 -0.004030826)
    Thelen2003Muscle MF_m3s_l: max_isometric_force=83.72206 optimal_fiber_length=0.04441926
        tendon_slack_length=0.01848445 pennation_angle_at_optimal=0
      PathPoint MF_m3s_l_P1: sacrum (-0.1396687 0.0961337 -0.02183922)
      PathPoint MF_m3s_l_P2: lumbar3 (-0.03597384 -0.005796167 -0.003322109)
    Thelen2003Muscle MF_m3t_1_l: max_isometric_force=90.97846 optimal_fiber_length=0.121561
        tendon_slack_length=0.04041257 pennation_angle_at_optimal=0
      PathPoint MF_m3t_1_l_P1: pelvis (-0.1770126 0.002298865 -0.01839092)
      PathPoint MF_m3t_1_l_P2: lumbar3 (-0.04796512 -0.009877827 -0.003222446)
    Thelen2003Muscle MF_m3t_2_l: max_isometric_force=90.97846 optimal_fiber_length=0.1008953
        tendon_slack_length=0.03359632 pennation_angle_at_optimal=0
      PathPoint MF_m3t_2_l_P1: pelvis (-0.1689666 0.02413808 -0.0251151)
      PathPoint MF_m3t_2_l_P2: lumbar3 (-0.04796512 -0.009882464 -0.002945603)
    Thelen2003Muscle MF_m3t_3_l: max_isometric_force=90.97846 optimal_fiber_length=0.1008953
        tendon_slack_length=0.03359632 pennation_angle_at_optimal=0
      PathPoint MF_m3t_3_l_P1: pelvis (-0.1689666 0.02413808 -0.0251151)
      PathPoint MF_m3t_3_l_P2: lumbar3 (-0.04796512 -0.009882464 -0.002945603)
    Thelen2003Muscle MF_m4s_l: max_isometric_force=101.066 optimal_fiber_length=0.04655705
        tendon_slack_length=0.02941016 pennation_angle_at_optimal=0
      PathPoint MF_m4s_l_P1: sacrum (-0.1651608 0.06288533 -0.02068978)
      PathPoint MF_m4s_l_P2: lumbar4 (-0.03597384 -0.0002079085 -0.002214739)
    Thelen2003Muscle MF_m4t_1_l: max_isometric_force=90.11722 optimal_fiber_length=0.06730683
        tendon_slack_length=0.02725106 pennation_angle_at_optimal=0
      PathPoint MF_m4t_1_l_P1: sacrum (-0.1747137 0.04827616 -0.01724149)
      PathPoint MF_m4t_1_l_P2: lumbar4 (-0.04296875 0 -0.003322109)
    Thelen2003Muscle MF_m4t_2_l: max_isometric_force=90.11722 optimal_fiber_length=0.08887235
        tendon_slack_length=0.03601435 pennation_angle_at_optimal=0
      PathPoint MF_m4t_2_l_P1: pelvis (-0.1735643 0.009195459 -0.01839092)
      PathPoint MF_m4t_2_l_P2: lumbar4 (-0.04396803 0.0001642247 -0.003189225)
    Thelen2003Muscle MF_m4t_3_l: max_isometric_force=90.11722 optimal_fiber_length=0.1023985
        tendon_slack_length=0.04142841 pennation_angle_at_optimal=0
      PathPoint MF_m4t_3_l_P1: pelvis (-0.1839092 -0.00459773 -0.01609205)
      PathPoint MF_m4t_3_l_P2: lumbar4 (-0.04406795 0.0001642247 -0.003322109)
    Thelen2003Muscle MF_m5s_l: max_isometric_force=34.87635 optimal_fiber_length=0.01559098
        tendon_slack_length=0.009863683 pennation_angle_at_optimal=0
      PathPoint MF_m5s_l_P1: sacrum (-0.1499492 0.07617323 -0.01379319)
      PathPoint MF_m5s_l_P2: lumbar5 (-0.03097747 0.01642247 -0.004429479)
    Thelen2003Muscle MF_m5t_1_l: max_isometric_force=34.87635 optimal_fiber_length=0.08716138
        tendon_slack_length=0.03520861 pennation_angle_at_optimal=0
      PathPoint MF_m5t_1_l_P1: sacrum (-0.2000783 0.006010635 -0.01152881)
      PathPoint MF_m5t_1_l_P2: lumbar5 (-0.0354842 0.01629013 -0.003244593)
    Thelen2003Muscle MF_m5t_2_l: max_isometric_force=34.87635 optimal_fiber_length=0.06524126
        tendon_slack_length=0.02641812 pennation_angle_at_optimal=0
      PathPoint MF_m5t_2_l_P1: sacrum (-0.1874908 0.02949651 -0.01345985)
      PathPoint MF_m5t_2_l_P2: lumbar5 (-0.03452649 0.01538757 -0.003244593)
    Thelen2003Muscle MF_m5t_3_l: max_isometric_force=34.87635 optimal_fiber_length=0.04675927
        tendon_slack_length=0.01895646 pennation_angle_at_optimal=0
      PathPoint MF_m5t_3_l_P1: sacrum (-0.175031 0.04894789 -0.01333342)
      PathPoint MF_m5t_3_l_P2: lumbar5 (-0.03279895 0.01472903 -0.003067414)
    Thelen2003Muscle MF_m4_laminar_l: max_isometric_force=25.94666 optimal_fiber_length=0.03451779
        tendon_slack_length=0.01315434 pennation_angle_at_optimal=0
      PathPoint MF_m4_laminar_l_P1: sacrum (-0.1471274 0.08906711 -0.02068978)
      PathPoint MF_m4_laminar_l_P2: lumbar4 (-0.03397529 0.005615945 -0.007685146)
    Thelen2003Muscle MF_m5_laminar_l: max_isometric_force=55.93696 optimal_fiber_length=0.02977982
        tendon_slack_length=0.01128376 pennation_angle_at_optimal=0
      PathPoint MF_m5_laminar_l_P1: pelvis (-0.1586217 0.05172446 -0.01422997)
      PathPoint MF_m5_laminar_l_P2: lumbar5 (-0.02897893 0.0173885 -0.006245565)
    Thelen2003Muscle IL_L1_r: max_isometric_force=147.4443 optimal_fiber_length=0.05666117 tendon_slack_length=0.128432
        pennation_angle_at_optimal=0.2408554
      PathPoint IL_L1_r_P1: pelvis (-0.1655102 0.04482798 0.05783036)
      PathPoint IL_L1_r_P2: lumbar1 (-0.03097747 0.01642247 0.03211372)
    Thelen2003Muscle IL_L2_r: max_isometric_force=183.2164 optimal_fiber_length=0.03999398
        tendon_slack_length=0.09075176 pennation_angle_at_optimal=0.2408554
      PathPoint IL_L2_r_P1: pelvis (-0.1563228 0.06436822 0.06321878)
      PathPoint IL_L2_r_P2: lumbar2 (-0.03242642 0.01247432 0.03432846)
      PathWrap: wrap_object=Cylinder method=hybrid
    Thelen2003Muscle IL_L3_r: max_isometric_force=216.7631 optimal_fiber_length=0.02644768
        tendon_slack_length=0.0600726 pennation_angle_at_optimal=0.2408554
      PathPoint IL_L3_r_P1: pelvis (-0.1402308 0.07816141 0.06896595)
      PathPoint IL_L3_r_P2: lumbar3 (-0.03166467 0.02118895 0.03448227)
      PathWrap: wrap_object=Cylinder method=hybrid
    Thelen2003Muscle IL_L4_r: max_isometric_force=414.9096 optimal_fiber_length=0.01892147
        tendon_slack_length=0.04290215 pennation_angle_at_optimal=0.2408554
      PathPoint IL_L4_r_P1: pelvis (-0.1344836 0.07471311 0.06436822)
      PathPoint IL_L4_r_P2: lumbar4 (-0.02374933 0.0266274 0.03432846)
      PathWrap: wrap_object=Cylinder method=hybrid
    Thelen2003Muscle IL_L1_l: max_isometric_force=147.4443 optimal_fiber_length=0.0566557 tendon_slack_length=0.1284196
        pennation_angle_at_optimal=0.2408554
      PathPoint IL_L1_l_P1: pelvis (-0.1655183 0.04482786 -0.05747162)
      PathPoint IL_L1_l_P2: lumbar1 (-0.03097747 0.01642247 -0.03211372)
    Thelen2003Muscle IL_L2_l: max_isometric_force=183.2164 optimal_fiber_length=0.0400032
        tendon_slack_length=0.09077269 pennation_angle_at_optimal=0.2408554
      PathPoint IL_L2_l_P1: pelvis (-0.1563228 0.06436822 -0.06321878)
      PathPoint IL_L2_l_P2: lumbar2 (-0.03197675 0.01255836 -0.03432846)
      PathWrap: wrap_object=Cylinder method=hybrid
    Thelen2003Muscle IL_L3_l: max_isometric_force=216.7631 optimal_fiber_length=0.02646562
        tendon_slack_length=0.06011335 pennation_angle_at_optimal=0.2408554
      PathPoint IL_L3_l_P1: pelvis (-0.1402308 0.07816141 -0.06896595)
      PathPoint IL_L3_l_P2: lumbar3 (-0.03197675 0.02125261 -0.03381807)
      PathWrap: wrap_object=Cylinder method=hybrid
    Thelen2003Muscle IL_L4_l: max_isometric_force=414.9096 optimal_fiber_length=0.01890021
        tendon_slack_length=0.04285396 pennation_angle_at_optimal=0.2408554
      PathPoint IL_L4_l_P1: pelvis (-0.1344836 0.07471311 -0.06436822)
      PathPoint IL_L4_l_P2: lumbar4 (-0.02398256 0.02704878 -0.03432846)
      PathWrap: wrap_object=Cylinder method=hybrid
    Thelen2003Muscle IL_R5_r: max_isometric_force=57.32231 optimal_fiber_length=0.1792483 tendon_slack_length=0.2509671
        pennation_angle_at_optimal=0.2408554
      PathPoint IL_r5_R_P1: pelvis (-0.1563228 0.05057503 0.05632219)
      PathPoint IL_r5_R_P2: lumbar2 (-0.04959374 0.001932056 0.0620127)
      PathPoint IL_r5_R_P3: torso (-0.07894259 0.1661568 0.06312007)
      PathPoint IL_r5_R_P4: torso (-0.07994187 0.1932056 0.06312007)
      PathPoint IL_r5_R_P5: torso (-0.08094114 0.2289486 0.06422744)
      PathPoint IL_r5_R_P6: torso (-0.07894259 0.2559974 0.06533481)
      PathPoint IL_r5_R_P7: torso (-0.07594477 0.27725 0.06533481)
      PathPoint IL_r5_R_P8: torso (-0.06994913 0.2975366 0.06644218)
    Thelen2003Muscle IL_R6_r: max_isometric_force=72.69179 optimal_fiber_length=0.1725172 tendon_slack_length=0.2083899
        pennation_angle_at_optimal=0.2408554
      PathPoint IL_r6_R_P1: pelvis (-0.1482768 0.06781651 0.06091992)
      PathPoint IL_r6_R_P2: lumbar2 (-0.04917854 0.002285738 0.06422744)
      PathPoint IL_r6_R_P3: torso (-0.07894259 0.1651908 0.06644218)
      PathPoint IL_r6_R_P4: torso (-0.07994187 0.1951376 0.06644218)
      PathPoint IL_r6_R_P5: torso (-0.08094114 0.2318467 0.06754955)
      PathPoint IL_r6_R_P6: torso (-0.07694405 0.2588954 0.06865692)
      PathPoint IL_r6_R_P7: torso (-0.07094841 0.2724198 0.06976429)
    Thelen2003Muscle IL_R7_r: max_isometric_force=87.65739 optimal_fiber_length=0.1678614 tendon_slack_length=0.176374
        pennation_angle_at_optimal=0.2408554
      PathPoint IL_r7_R_P1: pelvis (-0.1367825 0.07931084 0.06666708)
      PathPoint IL_r7_R_P2: lumbar2 (-0.04862954 0.002293224 0.06754955)
      PathPoint IL_r7_R_P3: torso (-0.07994187 0.1661568 0.06976429)
      PathPoint IL_r7_R_P4: torso (-0.07994187 0.1941716 0.06976429)
      PathPoint IL_r7_R_P5: torso (-0.08094114 0.2308806 0.07087166)
      PathPoint IL_r7_R_P6: torso (-0.0749455 0.2521333 0.07197903)
    Thelen2003Muscle IL_R8_r: max_isometric_force=77.91768 optimal_fiber_length=0.1538562 tendon_slack_length=0.1553823
        pennation_angle_at_optimal=0.2408554
      PathPoint IL_r8_R_P1: pelvis (-0.1390813 0.0816097 0.06896595)
      PathPoint IL_r8_R_P2: lumbar2 (-0.04796512 0.002898083 0.07087166)
      PathPoint IL_r8_R_P3: torso (-0.07894259 0.1613266 0.07197903)
      PathPoint IL_r8_R_P4: torso (-0.08104716 0.1941716 0.07197903)
      PathPoint IL_r8_R_P5: torso (-0.07894259 0.2212204 0.0730864)
    Thelen2003Muscle IL_R9_r: max_isometric_force=95.91499 optimal_fiber_length=0.1764346 tendon_slack_length=0.1038129
        pennation_angle_at_optimal=0.2408554
      PathPoint IL_r9_R_P1: pelvis (-0.1367825 0.08620743 0.06896595)
      PathPoint IL_r9_R_P2: lumbar2 (-0.04796512 0.002898083 0.0730864)
      PathPoint IL_r9_R_P3: torso (-0.07994187 0.1632587 0.07530114)
      PathPoint IL_r9_R_P4: torso (-0.07594477 0.1864434 0.07530114)
    Thelen2003Muscle IL_R10_r: max_isometric_force=191.842 optimal_fiber_length=0.1539697
        tendon_slack_length=0.09062052 pennation_angle_at_optimal=0.2408554
      PathPoint IL_r10_R_P1: pelvis (-0.1344836 0.08275914 0.07126481)
      PathPoint IL_r10_R_P2: lumbar2 (-0.04805336 0.0025376 0.07640851)
      PathPoint IL_r10_R_P3: torso (-0.0749455 0.1497343 0.07751588)
    Thelen2003Muscle IL_R11_r: max_isometric_force=235.1806 optimal_fiber_length=0.1269503
        tendon_slack_length=0.06356835 pennation_angle_at_optimal=0.2408554
      PathPoint IL_r11_R_P1: pelvis (-0.1298859 0.09080516 0.07356368)
      PathPoint IL_r11_R_P2: lumbar2 (-0.04791226 0.002611531 0.07973062)
      PathPoint IL_r11_R_P3: torso (-0.06195495 0.1207535 0.08194536)
    Thelen2003Muscle IL_R12_r: max_isometric_force=206.1732 optimal_fiber_length=0.09227975
        tendon_slack_length=0.0461857 pennation_angle_at_optimal=0.2408554
      PathPoint IL_r12_R_P1: pelvis (-0.127587 0.09425346 0.07701197)
      PathPoint IL_r12_R_P2: torso (-0.03197675 0.09177264 0.07419377)
    Thelen2003Muscle IL_R5_l: max_isometric_force=57.32231 optimal_fiber_length=0.1792514 tendon_slack_length=0.2509714
        pennation_angle_at_optimal=0.2408554
      PathPoint IL_r5_L_P1: pelvis (-0.1562171 0.0503887 -0.05630437)
      PathPoint IL_r5_L_P2: lumbar2 (-0.04959374 0.002039613 -0.0620127)
      PathPoint IL_r5_L_P3: torso (-0.07794332 0.1661568 -0.06312007)
      PathPoint IL_r5_L_P4: torso (-0.07994187 0.1932056 -0.06312007)
      PathPoint IL_r5_L_P5: torso (-0.08094114 0.2289486 -0.06422744)
      PathPoint IL_r5_L_P6: torso (-0.07894259 0.2559974 -0.06533481)
      PathPoint IL_r5_L_P7: torso (-0.07594477 0.27725 -0.06533481)
      PathPoint IL_r5_L_P8: torso (-0.06994913 0.2975366 -0.06644218)
    Thelen2003Muscle IL_R6_l: max_isometric_force=72.6918 optimal_fiber_length=0.1725341 tendon_slack_length=0.2084104
        pennation_angle_at_optimal=0.2408554
      PathPoint IL_r6_L_P1: pelvis (-0.1479572 0.06742743 -0.06089153)
      PathPoint IL_r6_L_P2: lumbar2 (-0.04917854 0.001932056 -0.06422744)
      PathPoint IL_r6_L_P3: torso (-0.07894259 0.1660602 -0.06644218)
      PathPoint IL_r6_L_P4: torso (-0.07894259 0.1951376 -0.06644218)
      PathPoint IL_r6_L_P5: torso (-0.07994187 0.2318467 -0.06754955)
      PathPoint IL_r6_L_P6: torso (-0.07694405 0.2588954 -0.06865692)
      PathPoint IL_r6_L_P7: torso (-0.07094841 0.2724198 -0.06976429)
    Thelen2003Muscle IL_R7_l: max_isometric_force=87.65739 optimal_fiber_length=0.1678301 tendon_slack_length=0.1763412
        pennation_angle_at_optimal=0.2408554
      PathPoint IL_r7_L_P1: pelvis (-0.136679 0.07961636 -0.0667534)
      PathPoint IL_r7_L_P2: lumbar2 (-0.04862954 0.002293224 -0.06754955)
      PathPoint IL_r7_L_P3: torso (-0.07994187 0.1661568 -0.06976429)
      PathPoint IL_r7_L_P4: torso (-0.07994187 0.1941716 -0.06976429)
      PathPoint IL_r7_L_P5: torso (-0.08094114 0.2308806 -0.07087166)
      PathPoint IL_r7_L_P6: torso (-0.0749455 0.2521333 -0.07197903)
    Thelen2003Muscle IL_R8_l: max_isometric_force=77.91768 optimal_fiber_length=0.1538545 tendon_slack_length=0.1553807
        pennation_angle_at_optimal=0.2408554
      PathPoint IL_r8_L_P1: pelvis (-0.1390813 0.0816097 -0.06896595)
      PathPoint IL_r8_L_P2: lumbar2 (-0.04796512 0.002758241 -0.07087166)
      PathPoint IL_r8_L_P3: torso (-0.07894259 0.1613266 -0.07197903)
      PathPoint IL_r8_L_P4: torso (-0.08094114 0.1941716 -0.07197903)
      PathPoint IL_r8_L_P5: torso (-0.07894259 0.2212204 -0.0730864)
    Thelen2003Muscle IL_R9_l: max_isometric_force=95.915 optimal_fiber_length=0.1763667 tendon_slack_length=0.103773
        pennation_angle_at_optimal=0.2408554
      PathPoint IL_r9_L_P1: pelvis (-0.1367825 0.08620743 -0.06896595)
      PathPoint IL_r9_L_P2: lumbar2 (-0.04831726 0.002564427 -0.0730864)
      PathPoint IL_r9_L_P3: torso (-0.07794332 0.1584286 -0.07530114)
      PathPoint IL_r9_L_P4: torso (-0.07594477 0.1864434 -0.07530114)
    Thelen2003Muscle IL_R10_l: max_isometric_force=191.842 optimal_fiber_length=0.1532309
        tendon_slack_length=0.09018573 pennation_angle_at_optimal=0.2408554
      PathPoint IL_r10_L_P1: pelvis (-0.1333342 0.08735687 -0.07126481)
      PathPoint IL_r10_L_P2: lumbar2 (-0.04805336 0.0025376 -0.07640851)
      PathPoint IL_r10_L_P3: torso (-0.07490303 0.1497343 -0.07751588)
    Thelen2003Muscle IL_R11_l: max_isometric_force=235.1806 optimal_fiber_length=0.1269638
        tendon_slack_length=0.06357511 pennation_angle_at_optimal=0.2408554
      PathPoint IL_r11_L_P1: pelvis (-0.1298859 0.09080516 -0.07356368)
      PathPoint IL_r11_L_P2: lumbar2 (-0.04791226 0.002611531 -0.07973062)
      PathPoint IL_r11_L_P3: torso (-0.06239433 0.1207535 -0.08194536)
    Thelen2003Muscle IL_R12_l: max_isometric_force=206.1732 optimal_fiber_length=0.09229599
        tendon_slack_length=0.04619382 pennation_angle_at_optimal=0.2408554
      PathPoint IL_r12_L_P1: pelvis (-0.127587 0.0941899 -0.07650944)
      PathPoint IL_r12_L_P2: torso (-0.03198894 0.09212031 -0.07419377)
    Thelen2003Muscle LTpT_T7_r: max_isometric_force=79.70635 optimal_fiber_length=0.1269321
        tendon_slack_length=0.2401391 pennation_angle_at_optimal=0.2199115
      PathPoint LTpT_t7_R_P1: sacrum (-0.15094 0.06955526 0.0003182319)
      PathPoint LTpT_t7_R_P2: lumbar2 (-0.04395803 0.004250522 0.01218107)
      PathPoint LTpT_t7_R_P3: torso (-0.07261 0.1842031 0.02153613)
      PathPoint LTpT_t7_R_P4: torso (-0.07994187 0.2579294 0.02931208)
    Thelen2003Muscle LTpT_T8_r: max_isometric_force=79.70635 optimal_fiber_length=0.1368086
        tendon_slack_length=0.2160809 pennation_angle_at_optimal=0.2199115
      PathPoint LTpT_t8_R_P1: sacrum (-0.164255 0.05775392 0.0004304739)
      PathPoint LTpT_t8_R_P2: lumbar4 (-0.04693977 0.0174313 0.006264778)
      PathPoint LTpT_t8_R_P3: lumbar3 (-0.04671583 0.01308572 0.009209285)
      PathPoint LTpT_t8_R_P4: lumbar2 (-0.04528297 0.002996145 0.01211462)
      PathPoint LTpT_t8_R_P5: torso (-0.07894259 0.2328127 0.02823793)
    Thelen2003Muscle LTpT_T9_r: max_isometric_force=139.4342 optimal_fiber_length=0.137319
        tendon_slack_length=0.2326794 pennation_angle_at_optimal=0.2199115
      PathPoint LTpT_t9_R_P1: sacrum (-0.1906012 0.03084525 0)
      PathPoint LTpT_t9_R_P2: lumbar4 (-0.04668605 0.01734986 0.008283125)
      PathPoint LTpT_t9_R_P3: lumbar3 (-0.04639576 0.01338277 0.01073039)
      PathPoint LTpT_t9_R_P4: lumbar2 (-0.04468381 0.003355053 0.01273475)
      PathPoint LTpT_t9_R_P5: torso (-0.0749455 0.2144582 0.02674309)
    Thelen2003Muscle LTpT_T10_r: max_isometric_force=120.5072 optimal_fiber_length=0.1265999
        tendon_slack_length=0.2146255 pennation_angle_at_optimal=0.2199115
      PathPoint LTpT_t10_R_P1: sacrum (-0.1890391 0.02823132 0.01232192)
      PathPoint LTpT_t10_R_P2: lumbar4 (-0.04668605 0.01734986 0.01390856)
      PathPoint LTpT_t10_R_P3: lumbar3 (-0.0460665 0.01355337 0.0159572)
      PathPoint LTpT_t10_R_P4: lumbar2 (-0.04396803 0.003265174 0.01688739)
      PathPoint LTpT_t10_R_P5: torso (-0.06795059 0.1864434 0.02004339)
    Thelen2003Muscle LTpT_T11_r: max_isometric_force=115.0784 optimal_fiber_length=0.109886
        tendon_slack_length=0.1861621 pennation_angle_at_optimal=0.2199115
      PathPoint LTpT_t11_R_P1: sacrum (-0.1812069 0.03529838 0.02763236)
      PathPoint LTpT_t11_R_P2: lumbar4 (-0.04668605 0.01642247 0.02429569)
      PathPoint LTpT_t11_R_P3: lumbar3 (-0.05011176 0.01303056 0.02312742)
      PathPoint LTpT_t11_R_P4: lumbar2 (-0.04596657 0.003265174 0.02195914)
      PathPoint LTpT_t11_R_P5: torso (-0.05895713 0.1562241 0.01951185)
    Thelen2003Muscle LTpT_T12_r: max_isometric_force=94.29293 optimal_fiber_length=0.08575807
        tendon_slack_length=0.1452819 pennation_angle_at_optimal=0.2199115
      PathPoint LTpT_t12_R_P1: sacrum (-0.1663918 0.0560923 0.03210365)
      PathPoint LTpT_t12_R_P2: lumbar4 (-0.04668605 0.01642247 0.02795001)
      PathPoint LTpT_t12_R_P3: lumbar3 (-0.04933153 0.01357887 0.02646326)
      PathPoint LTpT_t12_R_P4: lumbar2 (-0.04576952 0.003848007 0.02497595)
      PathPoint LTpT_t12_R_P5: torso (-0.05096294 0.1284817 0.01977087)
    Thelen2003Muscle LTpT_R7_r: max_isometric_force=79.70635 optimal_fiber_length=0.1413654
        tendon_slack_length=0.2363896 pennation_angle_at_optimal=0.2199115
      PathPoint LTpT_r7_R_P1: sacrum (-0.1509435 0.06955216 0.0003218411)
      PathPoint LTpT_r7_R_P2: lumbar4 (-0.04668625 0.01818972 0.00900244)
      PathPoint LTpT_r7_R_P3: lumbar3 (-0.046067 0.01368803 0.01423557)
      PathPoint LTpT_r7_R_P4: lumbar2 (-0.04395803 0.004168719 0.01912693)
      PathPoint LTpT_r7_R_P5: torso (-0.07794332 0.1787151 0.03930088)
      PathPoint LTpT_r7_R_P6: torso (-0.07894259 0.2038319 0.04383922)
      PathPoint LTpT_r7_R_P7: torso (-0.07694405 0.2347448 0.04678504)
      PathPoint LTpT_r7_R_P8: torso (-0.07394623 0.2598615 0.04798532)
    Thelen2003Muscle LTpT_R8_r: max_isometric_force=130.0205 optimal_fiber_length=0.1192363
        tendon_slack_length=0.2432065 pennation_angle_at_optimal=0.2199115
      PathPoint LTpT_r8_R_P1: sacrum (-0.1642539 0.05775898 0.00042529)
      PathPoint LTpT_r8_R_P2: lumbar4 (-0.04649499 0.0175079 0.01261671)
      PathPoint LTpT_r8_R_P3: lumbar3 (-0.04589143 0.01352439 0.01776166)
      PathPoint LTpT_r8_R_P4: lumbar2 (-0.04395803 0.003748188 0.02274692)
      PathPoint LTpT_r8_R_P5: torso (-0.07894259 0.1787151 0.04508423)
      PathPoint LTpT_r8_R_P6: torso (-0.07894259 0.2018998 0.04841044)
      PathPoint LTpT_r8_R_P7: torso (-0.07594477 0.2299146 0.05133068)
    Thelen2003Muscle LTpT_R9_r: max_isometric_force=110.6761 optimal_fiber_length=0.1069868
        tendon_slack_length=0.2613663 pennation_angle_at_optimal=0.2199115
      PathPoint LTpT_r9_R_P1: sacrum (-0.1905989 0.03085077 0)
      PathPoint LTpT_r9_R_P2: lumbar4 (-0.04668625 0.01708072 0.01648885)
      PathPoint LTpT_r9_R_P3: lumbar3 (-0.046067 0.01258106 0.02168462)
      PathPoint LTpT_r9_R_P4: lumbar2 (-0.04395853 0.003802971 0.0267855)
      PathPoint LTpT_r9_R_P5: torso (-0.07894259 0.1767831 0.04801444)
      PathPoint LTpT_r9_R_P6: torso (-0.07694405 0.1961036 0.0517805)
    Thelen2003Muscle LTpT_R10_r: max_isometric_force=120.4203 optimal_fiber_length=0.1273044
        tendon_slack_length=0.2187854 pennation_angle_at_optimal=0.2199115
      PathPoint LTpT_r10_R_P1: sacrum (-0.1890357 0.02823006 0.01232192)
      PathPoint LTpT_r10_R_P2: lumbar4 (-0.04663149 0.01629119 0.02152627)
      PathPoint LTpT_r10_R_P3: lumbar3 (-0.04601194 0.01224344 0.02597225)
      PathPoint LTpT_r10_R_P4: lumbar2 (-0.04390367 0.003522553 0.03026774)
      PathPoint LTpT_r10_R_P5: torso (-0.07694405 0.1700209 0.05192091)
    Thelen2003Muscle LTpT_R11_r: max_isometric_force=115.3854 optimal_fiber_length=0.1187393
        tendon_slack_length=0.1691227 pennation_angle_at_optimal=0.2199115
      PathPoint LTpT_r11_R_P1: sacrum (-0.181208 0.03529907 0.02763236)
      PathPoint LTpT_r11_R_P2: lumbar4 (-0.0460665 0.01734986 0.03257749)
      PathPoint LTpT_r11_R_P3: lumbar3 (-0.0460665 0.01346044 0.03607512)
      PathPoint LTpT_r11_R_P4: lumbar2 (-0.04399181 0.004327804 0.03939291)
      PathPoint LTpT_r11_R_P5: torso (-0.06497435 0.1426398 0.05044623)
    Thelen2003Muscle LTpT_R12_r: max_isometric_force=94.32635 optimal_fiber_length=0.0732876
        tendon_slack_length=0.1424926 pennation_angle_at_optimal=0.2199115
      PathPoint LTpT_r12_R_P1: sacrum (-0.1663918 0.0560923 0.03210365)
      PathPoint LTpT_r12_R_P2: lumbar4 (-0.04668605 0.01697948 0.03710486)
      PathPoint LTpT_r12_R_P3: lumbar3 (-0.0460665 0.01318039 0.03972534)
      PathPoint LTpT_r12_R_P4: lumbar2 (-0.04396803 0.004250522 0.04298289)
      PathPoint LTpT_r12_R_P5: torso (-0.04500237 0.1159233 0.05161982)
    Thelen2003Muscle LTpT_T7_l: max_isometric_force=79.70635 optimal_fiber_length=0.1269298
        tendon_slack_length=0.2401349 pennation_angle_at_optimal=0.2199115
      PathPoint LTpT_t7_L_P1: sacrum (-0.15094 0.06955526 -0.0003218411)
      PathPoint LTpT_t7_L_P2: lumbar2 (-0.04395803 0.004250522 -0.01218107)
      PathPoint LTpT_t7_L_P3: torso (-0.07294695 0.1845113 -0.02104002)
      PathPoint LTpT_t7_L_P4: torso (-0.07994187 0.2579294 -0.02879161)
    Thelen2003Muscle LTpT_T8_l: max_isometric_force=120.4665 optimal_fiber_length=0.1368086
        tendon_slack_length=0.2160809 pennation_angle_at_optimal=0.2199115
      PathPoint LTpT_t8_L_P1: sacrum (-0.164255 0.05775392 -0.00042529)
      PathPoint LTpT_t8_L_P2: lumbar4 (-0.04693977 0.0174313 -0.006267713)
      PathPoint LTpT_t8_L_P3: lumbar3 (-0.04671583 0.01308572 -0.009213316)
      PathPoint LTpT_t8_L_P4: lumbar2 (-0.04528297 0.002996145 -0.01211462)
      PathPoint LTpT_t8_L_P5: torso (-0.07894259 0.2328127 -0.02823793)
    Thelen2003Muscle LTpT_T9_l: max_isometric_force=139.4342 optimal_fiber_length=0.1373181
        tendon_slack_length=0.2326779 pennation_angle_at_optimal=0.2199115
      PathPoint LTpT_t9_L_P1: sacrum (-0.1906012 0.03084525 0)
      PathPoint LTpT_t9_L_P2: lumbar4 (-0.04668605 0.01734986 -0.008283125)
      PathPoint LTpT_t9_L_P3: lumbar3 (-0.04639576 0.01338277 -0.01073041)
      PathPoint LTpT_t9_L_P4: lumbar2 (-0.04468381 0.003355053 -0.01328844)
      PathPoint LTpT_t9_L_P5: torso (-0.0749455 0.2144582 -0.02657687)
    Thelen2003Muscle LTpT_T10_l: max_isometric_force=120.5072 optimal_fiber_length=0.1265996
        tendon_slack_length=0.2146251 pennation_angle_at_optimal=0.2199115
      PathPoint LTpT_t10_L_P1: sacrum (-0.1890391 0.02823132 -0.01232192)
      PathPoint LTpT_t10_L_P2: lumbar4 (-0.04668605 0.01734986 -0.01390856)
      PathPoint LTpT_t10_L_P3: lumbar3 (-0.0460665 0.01355337 -0.0159572)
      PathPoint LTpT_t10_L_P4: lumbar2 (-0.04396803 0.003265174 -0.01688739)
      PathPoint LTpT_t10_L_P5: torso (-0.06795059 0.1864434 -0.01993265)
    Thelen2003Muscle LTpT_T11_l: max_isometric_force=115.0784 optimal_fiber_length=0.1098907
        tendon_slack_length=0.1861701 pennation_angle_at_optimal=0.2199115
      PathPoint LTpT_t11_L_P1: sacrum (-0.1812069 0.03529838 -0.02763236)
      PathPoint LTpT_t11_L_P2: lumbar4 (-0.04668605 0.01642247 -0.02429569)
      PathPoint LTpT_t11_L_P3: lumbar3 (-0.05011176 0.01303056 -0.02312188)
      PathPoint LTpT_t11_L_P4: lumbar2 (-0.04596657 0.003265174 -0.02195914)
      PathPoint LTpT_t11_L_P5: torso (-0.06083476 0.1562241 -0.01951185)
    Thelen2003Muscle LTpT_T12_l: max_isometric_force=94.29293 optimal_fiber_length=0.0857604
        tendon_slack_length=0.1452859 pennation_angle_at_optimal=0.2199115
      PathPoint LTpT_t12_L_P1: sacrum (-0.1663918 0.0560923 -0.03218411)
      PathPoint LTpT_t12_L_P2: lumbar4 (-0.04668605 0.01642247 -0.02768424)
      PathPoint LTpT_t12_L_P3: lumbar3 (-0.04933153 0.01357887 -0.02657687)
      PathPoint LTpT_t12_L_P4: lumbar2 (-0.04576952 0.003848007 -0.0254695)
      PathPoint LTpT_t12_L_P5: torso (-0.05096294 0.1284817 -0.01993265)
    Thelen2003Muscle LTpT_R7_l: max_isometric_force=79.70635 optimal_fiber_length=0.1413296
        tendon_slack_length=0.2363295 pennation_angle_at_optimal=0.2199115
      PathPoint LTpT_r7_L_P1: sacrum (-0.1509435 0.07011538 -0.0003218411)
      PathPoint LTpT_r7_L_P2: lumbar4 (-0.04668625 0.01835453 -0.008858958)
      PathPoint LTpT_r7_L_P3: lumbar3 (-0.046067 0.01352439 -0.01424077)
      PathPoint LTpT_r7_L_P4: lumbar2 (-0.04395803 0.003864111 -0.01912428)
      PathPoint LTpT_r7_L_P5: torso (-0.07794332 0.1787151 -0.03930055)
      PathPoint LTpT_r7_L_P6: torso (-0.07894259 0.2038319 -0.04384077)
      PathPoint LTpT_r7_L_P7: torso (-0.07694405 0.2347448 -0.04678637)
      PathPoint LTpT_r7_L_P8: torso (-0.07394623 0.2598615 -0.04798233)
    Thelen2003Muscle LTpT_R8_l: max_isometric_force=130.0205 optimal_fiber_length=0.119236 tendon_slack_length=0.243206
        pennation_angle_at_optimal=0.2199115
      PathPoint LTpT_r8_L_P1: sacrum (-0.1642539 0.05775898 -0.00042529)
      PathPoint LTpT_r8_L_P2: lumbar4 (-0.04649499 0.0175079 -0.01261294)
      PathPoint LTpT_r8_L_P3: lumbar3 (-0.04589143 0.01304592 -0.01776221)
      PathPoint LTpT_r8_L_P4: lumbar2 (-0.04395803 0.003748188 -0.02274537)
      PathPoint LTpT_r8_L_P5: torso (-0.07894259 0.1787151 -0.04508102)
      PathPoint LTpT_r8_L_P6: torso (-0.07894259 0.2018998 -0.0484142)
      PathPoint LTpT_r8_L_P7: torso (-0.07594477 0.2299146 -0.05132659)
    Thelen2003Muscle LTpT_R9_l: max_isometric_force=110.6761 optimal_fiber_length=0.1069904
        tendon_slack_length=0.2613753 pennation_angle_at_optimal=0.2199115
      PathPoint LTpT_r9_L_P1: sacrum (-0.1905989 0.03085077 0)
      PathPoint LTpT_r9_L_P2: lumbar4 (-0.04668625 0.01708072 -0.01648874)
      PathPoint LTpT_r9_L_P3: lumbar3 (-0.046067 0.01258106 -0.0216823)
      PathPoint LTpT_r9_L_P4: lumbar2 (-0.04395853 0.003802971 -0.02678727)
      PathPoint LTpT_r9_L_P5: torso (-0.07894259 0.1767831 -0.04801555)
      PathPoint LTpT_r9_L_P6: torso (-0.07694405 0.1961036 -0.05204638)
    Thelen2003Muscle LTpT_R10_l: max_isometric_force=120.4203 optimal_fiber_length=0.1273064
        tendon_slack_length=0.2187889 pennation_angle_at_optimal=0.2199115
      PathPoint LTpT_r10_L_P1: sacrum (-0.1890357 0.02823006 -0.01232192)
      PathPoint LTpT_r10_L_P2: lumbar4 (-0.04663149 0.01629119 -0.02152727)
      PathPoint LTpT_r10_L_P3: lumbar3 (-0.04601194 0.01224344 -0.02596782)
      PathPoint LTpT_r10_L_P4: lumbar2 (-0.04390367 0.003522553 -0.03026441)
      PathPoint LTpT_r10_L_P5: torso (-0.07694405 0.1700209 -0.05204638)
    Thelen2003Muscle LTpT_R11_l: max_isometric_force=115.3853 optimal_fiber_length=0.1187393
        tendon_slack_length=0.1691227 pennation_angle_at_optimal=0.2199115
      PathPoint LTpT_r11_L_P1: sacrum (-0.181208 0.03529907 -0.02763236)
      PathPoint LTpT_r11_L_P2: lumbar4 (-0.0460665 0.01734986 -0.03257882)
      PathPoint LTpT_r11_L_P3: lumbar3 (-0.0460665 0.01346044 -0.03607811)
      PathPoint LTpT_r11_L_P4: lumbar2 (-0.04399181 0.004327804 -0.03938914)
      PathPoint LTpT_r11_L_P5: torso (-0.06497435 0.1426398 -0.05045176)
    Thelen2003Muscle LTpT_R12_l: max_isometric_force=94.32651 optimal_fiber_length=0.07326641
        tendon_slack_length=0.1424514 pennation_angle_at_optimal=0.2199115
      PathPoint LTpT_r12_L_P1: sacrum (-0.1663918 0.05632219 -0.03218411)
      PathPoint LTpT_r12_L_P2: lumbar4 (-0.04696585 0.0173885 -0.03765057)
      PathPoint LTpT_r12_L_P3: lumbar3 (-0.0460665 0.01318039 -0.03972135)
      PathPoint LTpT_r12_L_P4: lumbar2 (-0.04396803 0.004250522 -0.04298809)
      PathPoint LTpT_r12_L_P5: torso (-0.04500237 0.1159233 -0.05204638)
    Thelen2003Muscle LTpL_L5_r: max_isometric_force=157.7955 optimal_fiber_length=0.05704497
        tendon_slack_length=0.001107669 pennation_angle_at_optimal=0.2199115
      PathPoint LTpL_L5_L_P1: sacrum (-0.159232 0.07256195 0.0523117)
      PathPoint LTpL_L5_L_P2: lumbar5 (-0.01314344 0.02756464 0.02861698)
    Thelen2003Muscle LTpL_L4_r: max_isometric_force=151.8409 optimal_fiber_length=0.04585101
        tendon_slack_length=0.04941836 pennation_angle_at_optimal=0.2199115
      PathPoint LTpL_L4_L_P1: pelvis (-0.1528745 0.04712673 0.05517276)
      PathPoint LTpL_L4_L_P2: lumbar4 (-0.02298329 0.02611946 0.02820061)
    Thelen2003Muscle LTpL_L3_r: max_isometric_force=121.2841 optimal_fiber_length=0.06078891
        tendon_slack_length=0.06602579 pennation_angle_at_optimal=0.2199115
      PathPoint LTpL_L3_L_P1: pelvis (-0.1609205 0.04712673 0.05862105)
      PathPoint LTpL_L3_L_P2: lumbar3 (-0.02974897 0.02218377 0.02569297)
    Thelen2003Muscle LTpL_L2_r: max_isometric_force=108.3816 optimal_fiber_length=0.07672551
        tendon_slack_length=0.08442847 pennation_angle_at_optimal=0.2199115
      PathPoint LTpL_L2_L_P1: pelvis (-0.1632194 0.042529 0.06091992)
      PathPoint LTpL_L2_L_P2: lumbar2 (-0.02994742 0.01386752 0.02442824)
    Thelen2003Muscle LTpL_L1_r: max_isometric_force=106.1599 optimal_fiber_length=0.09053307
        tendon_slack_length=0.105455 pennation_angle_at_optimal=0.2199115
      PathPoint LTpL_L1_L_P1: pelvis (-0.1656574 0.03855104 0.06157958)
      PathPoint LTpL_L1_L_P2: lumbar1 (-0.03159782 0.01609103 0.02527306)
    Thelen2003Muscle LTpL_L5_l: max_isometric_force=157.7955 optimal_fiber_length=0.05702205
        tendon_slack_length=0.001107224 pennation_angle_at_optimal=0.2199115
      PathPoint LTpL_L5_l_P1: sacrum (-0.1597711 0.07241424 -0.05287389)
      PathPoint LTpL_L5_l_P2: lumbar5 (-0.01299055 0.02801481 -0.02879161)
    Thelen2003Muscle LTpL_L4_l: max_isometric_force=151.8409 optimal_fiber_length=0.0458681
        tendon_slack_length=0.04943679 pennation_angle_at_optimal=0.2199115
      PathPoint LTpL_L4_l_P1: pelvis (-0.1528745 0.04712673 -0.05517276)
      PathPoint LTpL_L4_l_P2: lumbar4 (-0.02298329 0.02608275 -0.02768424)
    Thelen2003Muscle LTpL_L3_l: max_isometric_force=121.2841 optimal_fiber_length=0.06078749
        tendon_slack_length=0.06602425 pennation_angle_at_optimal=0.2199115
      PathPoint LTpL_L3_l_P1: pelvis (-0.1609205 0.04712673 -0.05862105)
      PathPoint LTpL_L3_l_P2: lumbar3 (-0.0299782 0.02221864 -0.0254695)
    Thelen2003Muscle LTpL_L2_l: max_isometric_force=108.3816 optimal_fiber_length=0.07673976
        tendon_slack_length=0.08444415 pennation_angle_at_optimal=0.2199115
      PathPoint LTpL_L2_l_P1: pelvis (-0.1632194 0.042529 -0.06091992)
      PathPoint LTpL_L2_l_P2: lumbar2 (-0.0299782 0.01352439 -0.02436213)
    Thelen2003Muscle LTpL_L1_l: max_isometric_force=106.1599 optimal_fiber_length=0.09048745
        tendon_slack_length=0.1054019 pennation_angle_at_optimal=0.2199115
      PathPoint LTpL_L1_l_P1: pelvis (-0.1655183 0.0390807 -0.06206935)
      PathPoint LTpL_L1_l_P2: lumbar1 (-0.03197675 0.01642247 -0.0254695)
    Millard2012EquilibriumMuscle [values shared by the 20 below unless stated]: pennation_angle_at_optimal=0 [radians]
        minimum_activation=0.01
      ActiveForceLengthCurve: minimum_value=0
      ForceVelocityCurve: concentric_slope_at_vmax=0 concentric_slope_near_vmax=0.25 isometric_slope=5
          eccentric_slope_at_vmax=0 eccentric_slope_near_vmax=0.15 max_eccentric_velocity_force_multiplier=1.4
      FiberForceLengthCurve
      TendonForceLengthCurve
    Millard2012EquilibriumMuscle EO1_r: max_isometric_force=111.744 optimal_fiber_length=0.03709182
        tendon_slack_length=0.05891177
      PathPoint EO1_r_P1: Abdomen (0.00599564 0.04636933 0.02325476)
      PathPoint EO1_r_P2: torso (0.09293242 0.1680888 0.1029854)
    Millard2012EquilibriumMuscle EO2_r: max_isometric_force=132.3546 optimal_fiber_length=0.03948565
        tendon_slack_length=0.05743236
      PathPoint EO2_r_P1: torso (0.09093387 0.1362099 0.1162738)
      PathPoint EO2_r_P2: Abdomen (0.007994187 0.02221864 0.0365432)
    Millard2012EquilibriumMuscle EO3_r: max_isometric_force=138.8978 optimal_fiber_length=0.04055604
        tendon_slack_length=0.04918853
      PathPoint EO3_r_P1: torso (0.07845045 0.09710511 0.1257828)
      PathPoint EO3_r_P2: Abdomen (0.006766489 -0.007728222 0.0365432)
    Millard2012EquilibriumMuscle EO4_r: max_isometric_force=134.0928 optimal_fiber_length=0.04147402
        tendon_slack_length=0.04726968
      PathPoint EO4_r_P1: torso (0.06965754 0.08036926 0.1241982)
      PathPoint default: Abdomen (0.00599564 -0.02318467 0.03432846)
    Millard2012EquilibriumMuscle EO5_r: max_isometric_force=155.945 optimal_fiber_length=0.04435295
        tendon_slack_length=0.04856389
      PathPoint EO5_r_P1: torso (0.0009992733 0.1062631 0.1240254)
      PathPoint EO5_r_P2: pelvis (-0.06321878 0.09425346 0.1172421)
    Millard2012EquilibriumMuscle EO6_r: max_isometric_force=226.9645 optimal_fiber_length=0.05180503
        tendon_slack_length=0.05236009
      PathPoint EO6_r_P1: torso (-0.01099201 0.08984058 0.110737)
      PathPoint EO6_r_P2: pelvis (-0.07931084 0.1068972 0.1126444)
    Millard2012EquilibriumMuscle IO4_r: max_isometric_force=179.0459 optimal_fiber_length=0.09605121
        tendon_slack_length=0.01065195
      PathPoint IO4_r_P1: torso (0.06595204 0.104331 0.1339917)
      PathPoint IO4_r_P2: pelvis (-0.06091992 0.09425346 0.1149432)
    Millard2012EquilibriumMuscle IO5_r: max_isometric_force=157.0833 optimal_fiber_length=0.09661754
        tendon_slack_length=0.01077553
      PathPoint IO5_r_P1: torso (0.0299782 0.09273867 0.1273475)
      PathPoint IO5_r_P2: pelvis (-0.085058 0.1080466 0.09080516)
    Millard2012EquilibriumMuscle IO6_r: max_isometric_force=138.6115 optimal_fiber_length=0.09176907
        tendon_slack_length=0.0101559
      PathPoint IO6_r_P1: torso (0 0.08307839 0.110737)
      PathPoint IO6_r_P2: pelvis (-0.1034489 0.1011501 0.07586254)
    Millard2012EquilibriumMuscle EO1_l: max_isometric_force=111.744 optimal_fiber_length=0.03739956
        tendon_slack_length=0.05940054
      PathPoint EO1_l_P1: Abdomen (0.00599564 0.04636933 -0.02325476)
      PathPoint EO1_l_P2: torso (0.0895273 0.1648449 -0.1097831)
    Millard2012EquilibriumMuscle EO2_l: max_isometric_force=132.3546 optimal_fiber_length=0.03947754
        tendon_slack_length=0.05742057
      PathPoint EO2_l_P1: torso (0.09093387 0.1362099 -0.1160302)
      PathPoint EO2_l_P2: Abdomen (0.007994187 0.02221864 -0.0365432)
    Millard2012EquilibriumMuscle EO3_l: max_isometric_force=138.8978 optimal_fiber_length=0.04058285
        tendon_slack_length=0.04922105
      PathPoint EO3_l_P1: torso (0.07894259 0.09756881 -0.1262401)
      PathPoint EO3_l_P2: Abdomen (0.00662814 -0.00737171 -0.03608929)
    Millard2012EquilibriumMuscle EO4_l: max_isometric_force=134.0928 optimal_fiber_length=0.04150128
        tendon_slack_length=0.04730074
      PathPoint EO4_l_P1: torso (0.06994913 0.08018031 -0.1240254)
      PathPoint EO4_l_P2: Abdomen (0.006382459 -0.02277063 -0.03393025)
    Millard2012EquilibriumMuscle EO5_l: max_isometric_force=155.945 optimal_fiber_length=0.04440424
        tendon_slack_length=0.04862005
      PathPoint EO5_l_P1: torso (0.0008047428 0.106406 -0.123578)
      PathPoint EO5_l_P2: pelvis (-0.0628774 0.09371621 -0.1174237)
    Millard2012EquilibriumMuscle EO6_l: max_isometric_force=226.9645 optimal_fiber_length=0.05171471
        tendon_slack_length=0.0522688
      PathPoint EO6_l_P1: torso (-0.01099201 0.08984058 -0.110737)
      PathPoint EO6_l_P2: pelvis (-0.07931084 0.1068972 -0.1022995)
    Millard2012EquilibriumMuscle IO4_l: max_isometric_force=179.0459 optimal_fiber_length=0.09610071
        tendon_slack_length=0.01065744
      PathPoint IO4_l_P1: torso (0.06561019 0.1041909 -0.1343206)
      PathPoint IO4_l_P2: pelvis (-0.06045785 0.09402484 -0.1145484)
    Millard2012EquilibriumMuscle IO5_l: max_isometric_force=157.0833 optimal_fiber_length=0.09668812
        tendon_slack_length=0.0107834
      PathPoint IO5_l_P1: torso (0.03026879 0.09272456 -0.127342)
      PathPoint IO5_l_P2: pelvis (-0.08491524 0.1076258 -0.09084459)
    Millard2012EquilibriumMuscle IO6_l: max_isometric_force=138.6115 optimal_fiber_length=0.09176907
        tendon_slack_length=0.0101559
      PathPoint IO6_l_P1: torso (0 0.08307839 -0.110737)
      PathPoint IO6_l_P2: pelvis (-0.1034489 0.1011501 -0.07586254)
    Millard2012EquilibriumMuscle LD_Il_r: max_isometric_force=65.36625 optimal_fiber_length=0.4524163
        tendon_slack_length=0.01955606
      PathPoint LD_Il_r_P1: pelvis (-0.1450883 0.06321878 0.05595782)
      PathPoint LD_Il_r_P2: humerus_r (-0.01043466 -0.01676803 0.002957771)
      PathWrap: wrap_object=Chest_r method=hybrid
    Millard2012EquilibriumMuscle LD_Il_l: max_isometric_force=65.36622 optimal_fiber_length=0.4475183
        tendon_slack_length=0.01934434
      PathPoint LD_Il_l_P1: pelvis (-0.1308882 0.08520812 -0.06186165)
      PathPoint LD_Il_l_P2: humerus_l (-0.01079319 -0.01734417 -0.003059399)
      PathWrap: wrap_object=Chest_l method=hybrid
  MarkerSet:
    Marker RASI: pelvis (0.01472446 0.001190021 0.1466392)
    Marker RASI_IK: pelvis (0.02839065 0.0657654 0.1376166)
    Marker LASI: pelvis (0.007693492 0.01121022 -0.1436528)
    Marker LASI_IK: pelvis (0.0287 0.07002759 -0.1356991)
    Marker RPSI: pelvis (-0.1700078 0.03685057 0.04282319)
    Marker RPSI_IK: pelvis (-0.1583713 0.1096827 0.06129144)
    Marker LPSI: pelvis (-0.1705523 0.03975343 -0.04771052)
    Marker LPSI_IK: pelvis (-0.1569347 0.1195618 -0.05342245)
    Marker CLAV: torso (0.08290608 0.368377 0.0032245)
    Marker C7: torso (-0.06386629 0.4137536 -0.01270452)
    Marker RACR: torso (-0.01881851 0.3789468 0.1665312)
    Marker LACR: torso (-0.002423375 0.3784442 -0.1874773)
    Marker RLHE: humerus_r (0.02079049 -0.3313657 0.02251237)
    Marker LLHE: humerus_l (0.005872066 -0.3406974 -0.01893713)
    Marker RMHE: humerus_r (-0.0152144 -0.3343406 -0.04216724)
    Marker LMHE: humerus_l (-0.01696435 -0.3409156 0.04852999)
    Marker RRS: radius_r (0.005707916 -0.2692182 0.0528486)
    Marker LRS: radius_l (-0.005426466 -0.2562699 -0.05093995)
    Marker RUS: ulna_r (-0.02533686 -0.2828144 0.03654954)
    Marker LUS: ulna_l (-0.01820619 -0.2636306 -0.04267718)
    Marker RUA1: humerus_r (0.03842619 -0.2108654 0.02103302)
    Marker RUA2: humerus_r (0.05890971 -0.1824275 -0.01590527)
    Marker RUA3: humerus_r (0.02698191 -0.1499501 0.02685508)
    Marker LUA1: humerus_l (0.04489553 -0.2452641 -0.0299964)
    Marker LUA2: humerus_l (0.06781618 -0.2131987 -0.003463129)
    Marker LUA3: humerus_l (0.03846555 -0.1804592 -0.03213553)
    Marker RF1: radius_r (-0.02474938 -0.162234 0.02989223)
    Marker RF2: radius_r (-0.02623708 -0.1238827 -0.00378019)
    Marker RF3: radius_r (-0.03066172 -0.09097135 0.02836966)
    Marker LF1: radius_l (-0.02663037 -0.1711859 -0.02567883)
    Marker LF2: radius_l (-0.02994295 -0.1261124 -0.007770443)
    Marker LF3: radius_l (-0.02188553 -0.08254468 -0.05151901)
    Marker R2K: hand_r (-0.00247962 -0.07898493 0.03400428)
    Marker L2K: hand_l (-0.008824148 -0.08042875 -0.03725175)
    Marker R5K: hand_r (-0.009702298 -0.0506944 -0.04291356)
    Marker L5K: hand_l (-0.009334825 -0.06079804 0.04564704)
